<?xml version="1.0" encoding="UTF-8"?>
<?xml-stylesheet type="text/xsl" href="http://jsbsim.sourceforge.net/JSBSim.xsl"?>
<fdm_config name="AD3000" version="2.0" release="ALPHA_SOURCE_ASSEMBLY"
            xmlns:xsi="http://www.w3.org/2001/XMLSchema-instance"
            xsi:noNamespaceSchemaLocation="http://jsbsim.sourceforge.net/JSBSim.xsd">
  <fileheader>
    <author>junyeopkwon / OpenAI Codex</author>
    <filecreationdate>2026-08-11</filecreationdate>
    <version>0.1.0</version>
    <description>
      AD3000 lift-plus-cruise VTOL JSBSim 초기 모델이다. 제공된 AD3000 workbook, DATCOM 공력 XML, STEP 형상 정보를 기준으로 구성했다. 구조 좌표는 nose datum을 원점으로 하며 JSBSim x-aft, y-right, z-up 좌표계를 사용한다.
    </description>
  </fileheader>

  <metrics file="Metrics.xml"/>
  <mass_balance file="Mass.xml"/>
  <ground_reactions file="Gear.xml"/>
  <propulsion file="Propulsion.xml"/>
  <system file="Effectors.xml"/>
  <flight_control file="FlightControl.xml"/>
  <aerodynamics file="Aero.xml"/>
</fdm_config>
