<?xml version="1.0" ?>

<fdm_config name="F450" release="ALPHA" version="2.0">
    <fileheader/>

    <metrics file="Metrics.xml"/>

    <mass_balance file="Mass.xml"/>

    <ground_reactions file="Gear.xml"/>

    <propulsion file="Propulsion.xml"/>

    <system file="Effectors.xml"/>

    <flight_control file="FlightControl.xml"/>

    <autopilot file="F450AP.xml"/>

    <system file="px4_default_imu_sensor.xml"/>
    <system file="px4_default_baro_sensor.xml"/>
    <system file="px4_default_gps_sensor.xml"/>
    <aerodynamics file="Aero.xml"/>

</fdm_config>
