<?xml version="1.0"?>
<aerodynamics>
  <axis name="LIFT">
    <function name="aero/coefficient/CL_alpha">
      <product>
        <property>aero/qbar-area</property>
        <table>
          <independentVar lookup="row">aero/alpha-rad</independentVar>
          <tableData>
              -3.14159     0.0000
              -2.96706     0.3420
              -2.44346     0.9848
              -1.91986     0.6428
              -1.39626    -0.3420
              -0.87266    -0.9848
              -0.48869    -0.8293
              -0.38397    -0.7094
              -0.27925    -0.8719
              -0.17453    -0.6199
              -0.06981    -0.0991
               0.03491     0.4245
               0.13963     0.9466
               0.24435     1.3152
               0.34907     0.7269
               0.45379     0.7894
               0.69813     0.9848
               1.22173     0.6428
               1.74533    -0.3420
               2.26893    -0.9848
               2.79253    -0.6428
               3.14159    -0.0000
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            </tableData>
        </table>
      </product>
    </function>
    <function name="aero/coefficient/CLde">
      <product>
        <property>aero/qbar-area</property>
        <property>fcs/elevator-pos-rad</property>
        <value>-0.35</value>
      </product>
    </function>
    <function name="aero/coefficient/CLq">
      <product>
        <property>aero/qbar-area</property>
        <property>aero/ci2vel</property>
        <property>velocities/q-aero-rad_sec</property>
        <value>4.0</value>
      </product>
    </function>
  </axis>
  <axis name="DRAG">
    <function name="aero/coefficient/CD_alpha">
      <product>
        <property>aero/qbar-area</property>
        <table>
          <independentVar lookup="row">aero/alpha-rad</independentVar>
          <tableData>
              -3.14159     0.0300
              -2.96706     0.0903
              -2.44346     0.8564
              -1.91986     1.7960
              -1.39626     1.9697
              -0.87266     1.2036
              -0.48869     0.4708
              -0.38397     0.3082
              -0.27925     0.1332
              -0.17453     0.0598
              -0.06981     0.0454
               0.03491     0.0517
               0.13963     0.0785
               0.24435     0.1292
               0.34907     0.2596
               0.45379     0.4142
               0.69813     0.8563
               1.22173     1.7960
               1.74533     1.9697
               2.26893     1.2036
               2.79253     0.2640
               3.14159     0.0300
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            </tableData>
        </table>
      </product>
    </function>
    <function name="aero/coefficient/CDbeta">
      <product>
        <property>aero/qbar-area</property>
        <property>aero/beta-rad</property>
        <property>aero/beta-rad</property>
        <value>0.25</value>
      </product>
    </function>
  </axis>
  <axis name="SIDE">
    <function name="aero/coefficient/CYb">
      <product>
        <property>aero/qbar-area</property>
        <property>aero/beta-rad</property>
        <value>-0.30</value>
      </product>
    </function>
    <function name="aero/coefficient/CYr">
      <product>
        <property>aero/qbar-area</property>
        <property>aero/bi2vel</property>
        <property>velocities/r-aero-rad_sec</property>
        <value>0.10</value>
      </product>
    </function>
  </axis>
  <axis name="ROLL">
    <function name="aero/coefficient/Clb">
      <product>
        <property>aero/qbar-area</property>
        <property>metrics/bw-ft</property>
        <property>aero/beta-rad</property>
        <value>-0.06</value>
      </product>
    </function>
    <function name="aero/coefficient/Clp">
      <product>
        <property>aero/qbar-area</property>
        <property>metrics/bw-ft</property>
        <property>aero/bi2vel</property>
        <property>velocities/p-aero-rad_sec</property>
        <value>-0.50</value>
      </product>
    </function>
    <function name="aero/coefficient/Clr">
      <product>
        <property>aero/qbar-area</property>
        <property>metrics/bw-ft</property>
        <property>aero/bi2vel</property>
        <property>velocities/r-aero-rad_sec</property>
        <value>0.10</value>
      </product>
    </function>
    <function name="aero/coefficient/Clda">
      <product>
        <property>aero/qbar-area</property>
        <property>metrics/bw-ft</property>
        <property>fcs/effective-aileron-pos</property>
        <value>0.18</value>
      </product>
    </function>
  </axis>
  <axis name="PITCH">
    <function name="aero/coefficient/Cm0">
      <product>
        <property>aero/qbar-area</property>
        <property>metrics/cbarw-ft</property>
        <value>0.04</value>
      </product>
    </function>
    <function name="aero/coefficient/Cmalpha">
      <product>
        <property>aero/qbar-area</property>
        <property>metrics/cbarw-ft</property>
        <property>aero/alpha-rad</property>
        <value>-0.60</value>
      </product>
    </function>
    <function name="aero/coefficient/Cmq">
      <product>
        <property>aero/qbar-area</property>
        <property>metrics/cbarw-ft</property>
        <property>aero/ci2vel</property>
        <property>velocities/q-aero-rad_sec</property>
        <value>-14.0</value>
      </product>
    </function>
    <function name="aero/coefficient/Cmde">
      <product>
        <property>aero/qbar-area</property>
        <property>metrics/cbarw-ft</property>
        <property>fcs/elevator-pos-rad</property>
        <value>1.10</value>
      </product>
    </function>
  </axis>
  <axis name="YAW">
    <function name="aero/coefficient/Cnb">
      <product>
        <property>aero/qbar-area</property>
        <property>metrics/bw-ft</property>
        <property>aero/beta-rad</property>
        <value>0.07</value>
      </product>
    </function>
    <function name="aero/coefficient/Cnr">
      <product>
        <property>aero/qbar-area</property>
        <property>metrics/bw-ft</property>
        <property>aero/bi2vel</property>
        <property>velocities/r-aero-rad_sec</property>
        <value>-0.10</value>
      </product>
    </function>
    <function name="aero/coefficient/Cndr">
      <product>
        <property>aero/qbar-area</property>
        <property>metrics/bw-ft</property>
        <property>fcs/rudder-pos-rad</property>
        <value>0.09</value>
      </product>
    </function>
    <function name="aero/coefficient/motor_yaw_torque">
      <product>
        <property>fcs/net_torque</property>
        <value>12.0</value>
      </product>
    </function>
  </axis>
</aerodynamics>
