<?xml version="1.0" encoding="UTF-8"?>
<fdm_config name="Adsys_vtol" version="1.0" release="ACDL-DATCOM">
  <fileheader>
    <author>ACDL_DATCOM_Studio</author>
    <description>DATCOM-derived JSBSim aerodynamic database. Validated common Alpha range: -24 to 11 deg.</description>
  </fileheader>
  <metrics>
    <wingarea unit="M2">0.56818182</wingarea>
    <wingspan unit="M">2.5</wingspan>
    <chord unit="M">0.23666524</chord>
  </metrics>
  <flight_control name="ACDL_DATCOM_generated">
    <channel name="Roll">
      <aerosurface_scale name="fcs/effective-aileron-control-deg">
        <input>fcs/aileron-cmd-norm</input>
        <range>
          <min>-20</min>
          <max>20</max>
        </range>
        <output>fcs/effective-aileron-pos-deg</output>
      </aerosurface_scale>
    </channel>
  </flight_control>
  <aerodynamics>
    <alphalimits unit="DEG">
      <min>-24</min>
      <max>11</max>
    </alphalimits>
    <axis name="LIFT">
      <function name="aero/coefficient/CL_base">
        <description>Lift coefficient from DATCOM clean case</description>
        <product>
          <property>aero/qbar-area</property>
          <table>
            <independentVar lookup="row">aero/alpha-deg</independentVar>
            <independentVar lookup="table">velocities/mach</independentVar>
            <tableData breakPoint="0.1">
                       -24         -1.913
                     -21.5         -1.788
                       -19         -1.601
                     -16.5         -1.354
                       -14         -1.073
                     -11.5         -0.794
                        -9         -0.521
                      -6.5         -0.258
                        -4         -0.005
                      -1.5          0.255
                         1          0.523
                       3.5          0.799
                         6          1.081
                       8.5          1.348
                        11          1.553
            </tableData>
            <tableData breakPoint="0.2">
                       -24         -1.916
                     -21.5         -1.793
                       -19         -1.607
                     -16.5         -1.361
                       -14         -1.079
                     -11.5         -0.799
                        -9         -0.525
                      -6.5          -0.26
                        -4         -0.005
                      -1.5          0.256
                         1          0.527
                       3.5          0.804
                         6          1.087
                       8.5          1.354
                        11          1.559
            </tableData>
            <tableData breakPoint="0.3">
                       -24         -1.805
                     -21.5          -1.67
                       -19          -1.53
                     -16.5          -1.33
                       -14         -1.072
                     -11.5         -0.798
                        -9         -0.526
                      -6.5         -0.261
                        -4         -0.004
                      -1.5          0.258
                         1          0.527
                       3.5          0.801
                         6          1.076
                       8.5          1.301
                        11          1.472
            </tableData>
          </table>
        </product>
      </function>
      <function name="aero/coefficient/CLq">
        <description>Lift due to pitch rate</description>
        <product>
          <property>aero/qbar-area</property>
          <product>
            <value>57.295779513082</value>
            <property>velocities/q-aero-rad_sec</property>
            <property>metrics/cbarw-ft</property>
            <value>0.5</value>
            <quotient>
              <value>1.0</value>
              <property>velocities/vt-fps</property>
            </quotient>
          </product>
          <table>
            <independentVar lookup="row">aero/alpha-deg</independentVar>
            <independentVar lookup="table">velocities/mach</independentVar>
            <tableData breakPoint="0.1">
                       -24        0.03341
                     -21.5        0.03341
                       -19        0.03341
                     -16.5        0.03341
                       -14        0.03341
                     -11.5        0.03341
                        -9        0.03341
                      -6.5        0.03341
                        -4        0.03341
                      -1.5        0.03341
                         1        0.03341
                       3.5        0.03341
                         6        0.03341
                       8.5        0.03341
                        11        0.03341
            </tableData>
            <tableData breakPoint="0.2">
                       -24        0.03807
                     -21.5        0.03807
                       -19        0.03807
                     -16.5        0.03807
                       -14        0.03807
                     -11.5        0.03807
                        -9        0.03807
                      -6.5        0.03807
                        -4        0.03807
                      -1.5        0.03807
                         1        0.03807
                       3.5        0.03807
                         6        0.03807
                       8.5        0.03807
                        11        0.03807
            </tableData>
            <tableData breakPoint="0.3">
                       -24        0.09216
                     -21.5        0.09216
                       -19        0.09216
                     -16.5        0.09216
                       -14        0.09216
                     -11.5        0.09216
                        -9        0.09216
                      -6.5        0.09216
                        -4        0.09216
                      -1.5        0.09216
                         1        0.09216
                       3.5        0.09216
                         6        0.09216
                       8.5        0.09216
                        11        0.09216
            </tableData>
          </table>
        </product>
      </function>
      <function name="aero/coefficient/CLadot">
        <description>Lift due to alpha-dot</description>
        <product>
          <property>aero/qbar-area</property>
          <product>
            <value>57.295779513082</value>
            <property>aero/alphadot-rad_sec</property>
            <property>metrics/cbarw-ft</property>
            <value>0.5</value>
            <quotient>
              <value>1.0</value>
              <property>velocities/vt-fps</property>
            </quotient>
          </product>
          <table>
            <independentVar lookup="row">aero/alpha-deg</independentVar>
            <independentVar lookup="table">velocities/mach</independentVar>
            <tableData breakPoint="0.1">
                       -24     -0.0004351
                     -21.5     -0.0005032
                       -19     -0.0006471
                     -16.5     -0.0007802
                       -14     -0.0008457
                     -11.5     -0.0008557
                        -9     -0.0008554
                      -6.5     -0.0008499
                        -4     -0.0008633
                      -1.5        -0.0009
                         1     -0.0009318
                       3.5     -0.0009269
                         6     -0.0008798
                       8.5     -0.0007828
                        11     -0.0006031
            </tableData>
            <tableData breakPoint="0.2">
                       -24      0.0002935
                     -21.5        0.00034
                       -19      0.0004372
                     -16.5      0.0005288
                       -14      0.0005753
                     -11.5      0.0005823
                        -9      0.0005824
                      -6.5      0.0005789
                        -4       0.000588
                      -1.5      0.0006128
                         1      0.0006342
                       3.5      0.0006304
                         6      0.0005968
                       8.5      0.0005299
                        11      0.0004112
            </tableData>
            <tableData breakPoint="0.3">
                       -24        0.01056
                     -21.5        0.01059
                       -19        0.01228
                     -16.5        0.01569
                       -14        0.01802
                     -11.5        0.01869
                        -9         0.0188
                      -6.5        0.01879
                        -4         0.0191
                      -1.5        0.01981
                         1        0.02038
                       3.5        0.01997
                         6        0.01799
                       8.5        0.01508
                        11         0.0105
            </tableData>
          </table>
        </product>
      </function>
    </axis>
    <axis name="DRAG">
      <function name="aero/coefficient/CD_base">
        <description>Drag coefficient from DATCOM clean case</description>
        <product>
          <property>aero/qbar-area</property>
          <table>
            <independentVar lookup="row">aero/alpha-deg</independentVar>
            <independentVar lookup="table">velocities/mach</independentVar>
            <tableData breakPoint="0.1">
                       -24          0.197
                     -21.5          0.174
                       -19          0.144
                     -16.5          0.112
                       -14          0.083
                     -11.5           0.06
                        -9          0.044
                      -6.5          0.033
                        -4          0.029
                      -1.5           0.03
                         1          0.037
                       3.5           0.05
                         6          0.069
                       8.5          0.092
                        11          0.116
            </tableData>
            <tableData breakPoint="0.2">
                       -24          0.185
                     -21.5          0.163
                       -19          0.135
                     -16.5          0.105
                       -14          0.077
                     -11.5          0.055
                        -9          0.039
                      -6.5          0.029
                        -4          0.025
                      -1.5          0.026
                         1          0.033
                       3.5          0.046
                         6          0.065
                       8.5          0.089
                        11          0.112
            </tableData>
            <tableData breakPoint="0.3">
                       -24          0.166
                     -21.5          0.145
                       -19          0.124
                     -16.5          0.099
                       -14          0.073
                     -11.5          0.052
                        -9          0.037
                      -6.5          0.027
                        -4          0.023
                      -1.5          0.025
                         1          0.031
                       3.5          0.044
                         6          0.063
                       8.5          0.083
                        11          0.102
            </tableData>
          </table>
        </product>
      </function>
    </axis>
    <axis name="SIDE">
      <function name="aero/coefficient/CYp">
        <description>Side force due to roll rate</description>
        <product>
          <property>aero/qbar-area</property>
          <product>
            <value>57.295779513082</value>
            <property>velocities/p-aero-rad_sec</property>
            <property>metrics/bw-ft</property>
            <value>0.5</value>
            <quotient>
              <value>1.0</value>
              <property>velocities/vt-fps</property>
            </quotient>
          </product>
          <table>
            <independentVar lookup="row">aero/alpha-deg</independentVar>
            <independentVar lookup="table">velocities/mach</independentVar>
            <tableData breakPoint="0.1">
                       -24      -0.001606
                     -21.5      -0.001456
                       -19      -0.001393
                     -16.5      -0.001417
                       -14      -0.001492
                     -11.5      -0.001555
                        -9      -0.001603
                      -6.5       -0.00163
                        -4      -0.001635
                      -1.5      -0.001655
                         1      -0.001699
                       3.5      -0.001771
                         6      -0.001897
                       8.5       -0.00352
                        11       -0.00156
            </tableData>
            <tableData breakPoint="0.2">
                       -24      -0.001634
                     -21.5      -0.001479
                       -19      -0.001412
                     -16.5      -0.001431
                       -14      -0.001505
                     -11.5      -0.001568
                        -9      -0.001615
                      -6.5      -0.001642
                        -4      -0.001647
                      -1.5      -0.001667
                         1      -0.001711
                       3.5      -0.001782
                         6      -0.001906
                       8.5      -0.003696
                        11      -0.001568
            </tableData>
            <tableData breakPoint="0.3">
                       -24      -0.001837
                     -21.5      -0.001715
                       -19      -0.001575
                     -16.5      -0.001519
                       -14      -0.001553
                     -11.5      -0.001604
                        -9      -0.001642
                      -6.5      -0.001665
                        -4      -0.001669
                      -1.5      -0.001685
                         1       -0.00172
                       3.5      -0.001776
                         6      -0.001878
                       8.5      -0.001162
                        11      -0.001483
            </tableData>
          </table>
        </product>
      </function>
    </axis>
    <axis name="ROLL">
      <function name="aero/coefficient/Cl_beta">
        <description>Rolling moment due to sideslip: DATCOM CLB_per_deg multiplied by beta_deg</description>
        <product>
          <property>aero/qbar-area</property>
          <property>metrics/bw-ft</property>
          <property>aero/beta-deg</property>
          <table>
            <independentVar lookup="row">aero/alpha-deg</independentVar>
            <independentVar lookup="table">velocities/mach</independentVar>
            <tableData breakPoint="0.1">
                       -24      -0.002811
                     -21.5      -0.002667
                       -19      -0.002531
                     -16.5      -0.002406
                       -14      -0.002288
                     -11.5       -0.00217
                        -9      -0.002048
                      -6.5       -0.00192
                        -4      -0.001787
                      -1.5      -0.001653
                         1      -0.001518
                       3.5      -0.001383
                         6      -0.001249
                       8.5      -0.001112
                        11     -0.0009633
            </tableData>
            <tableData breakPoint="0.2">
                       -24      -0.002828
                     -21.5      -0.002683
                       -19      -0.002546
                     -16.5       -0.00242
                       -14      -0.002301
                     -11.5      -0.002183
                        -9       -0.00206
                      -6.5      -0.001932
                        -4      -0.001799
                      -1.5      -0.001664
                         1      -0.001529
                       3.5      -0.001394
                         6      -0.001259
                       8.5      -0.001121
                        11     -0.0009713
            </tableData>
            <tableData breakPoint="0.3">
                       -24       -0.00288
                     -21.5      -0.002744
                       -19      -0.002596
                     -16.5      -0.002458
                       -14      -0.002332
                     -11.5       -0.00221
                        -9      -0.002085
                      -6.5      -0.001955
                        -4      -0.001821
                      -1.5      -0.001685
                         1      -0.001548
                       3.5      -0.001411
                         6      -0.001273
                       8.5      -0.001124
                        11      -0.000966
            </tableData>
          </table>
        </product>
      </function>
      <function name="aero/coefficient/Clp">
        <description>Roll damping</description>
        <product>
          <property>aero/qbar-area</property>
          <property>metrics/bw-ft</property>
          <product>
            <value>57.295779513082</value>
            <property>velocities/p-aero-rad_sec</property>
            <property>metrics/bw-ft</property>
            <value>0.5</value>
            <quotient>
              <value>1.0</value>
              <property>velocities/vt-fps</property>
            </quotient>
          </product>
          <table>
            <independentVar lookup="row">aero/alpha-deg</independentVar>
            <independentVar lookup="table">velocities/mach</independentVar>
            <tableData breakPoint="0.1">
                       -24      -0.000113
                     -21.5      0.0005875
                       -19         0.0013
                     -16.5       0.001906
                       -14       0.002193
                     -11.5       0.002251
                        -9       0.002259
                      -6.5       0.002225
                        -4       0.002269
                      -1.5       0.002414
                         1       0.002535
                       3.5       0.002597
                         6       0.002501
                       8.5       0.002042
                        11       0.001391
            </tableData>
            <tableData breakPoint="0.2">
                       -24     -7.693e-05
                     -21.5      0.0006763
                       -19       0.001433
                     -16.5       0.002086
                       -14       0.002403
                     -11.5        0.00246
                        -9       0.002465
                      -6.5       0.002425
                        -4        0.00247
                      -1.5       0.002621
                         1       0.002749
                       3.5       0.002815
                         6         0.0027
                       8.5         0.0022
                        11       0.001505
            </tableData>
            <tableData breakPoint="0.3">
                       -24       0.002699
                     -21.5       0.002674
                       -19       0.003488
                     -16.5       0.005204
                       -14       0.006354
                     -11.5       0.006622
                        -9       0.006569
                      -6.5       0.006429
                        -4       0.006473
                      -1.5       0.006752
                         1       0.006989
                       3.5       0.007059
                         6       0.006207
                       8.5       0.004632
                        11       0.002459
            </tableData>
          </table>
        </product>
      </function>
      <function name="aero/coefficient/Clr">
        <description>Roll moment due to yaw rate</description>
        <product>
          <property>aero/qbar-area</property>
          <property>metrics/bw-ft</property>
          <product>
            <value>57.295779513082</value>
            <property>velocities/r-aero-rad_sec</property>
            <property>metrics/bw-ft</property>
            <value>0.5</value>
            <quotient>
              <value>1.0</value>
              <property>velocities/vt-fps</property>
            </quotient>
          </product>
          <table>
            <independentVar lookup="row">aero/alpha-deg</independentVar>
            <independentVar lookup="table">velocities/mach</independentVar>
            <tableData breakPoint="0.1">
                       -24      -0.005408
                     -21.5      -0.005025
                       -19      -0.004419
                     -16.5      -0.003584
                       -14      -0.002609
                     -11.5      -0.001652
                        -9     -0.0007263
                      -6.5      0.0001535
                        -4      0.0009832
                      -1.5       0.001845
                         1       0.002754
                       3.5       0.003695
                         6       0.004656
                       8.5       0.005543
                        11       0.006176
            </tableData>
            <tableData breakPoint="0.2">
                       -24      -0.005504
                     -21.5      -0.005121
                       -19       -0.00451
                     -16.5       -0.00367
                       -14      -0.002676
                     -11.5      -0.001699
                        -9      -0.000754
                      -6.5      0.0001453
                        -4      0.0009945
                      -1.5       0.001876
                         1       0.002804
                       3.5       0.003766
                         6       0.004746
                       8.5       0.005641
                        11       0.006281
            </tableData>
            <tableData breakPoint="0.3">
                       -24      -0.005288
                     -21.5      -0.004796
                       -19      -0.004341
                     -16.5      -0.003659
                       -14      -0.002734
                     -11.5      -0.001752
                        -9     -0.0007918
                      -6.5      0.0001321
                        -4       0.001014
                      -1.5       0.001923
                         1       0.002869
                       3.5       0.003838
                         6       0.004801
                       8.5       0.005514
                        11       0.006006
            </tableData>
          </table>
        </product>
      </function>
      <function name="aero/coefficient/Cl_da">
        <description>Rolling moment increment due to aileron deflection</description>
        <product>
          <property>aero/qbar-area</property>
          <property>metrics/bw-ft</property>
          <table>
            <independentVar lookup="row">aero/alpha-deg</independentVar>
            <independentVar lookup="column">fcs/effective-aileron-pos-deg</independentVar>
            <independentVar lookup="table">velocities/mach</independentVar>
            <tableData breakPoint="0.1">
                         -20           -10             0            10            20
                       -24     -0.062287     -0.036639             0      0.036639      0.062287
                     -21.5     -0.062287     -0.036639             0      0.036639      0.062287
                       -19     -0.062287     -0.036639             0      0.036639      0.062287
                     -16.5     -0.062287     -0.036639             0      0.036639      0.062287
                       -14     -0.062287     -0.036639             0      0.036639      0.062287
                     -11.5     -0.062287     -0.036639             0      0.036639      0.062287
                        -9     -0.062287     -0.036639             0      0.036639      0.062287
                      -6.5     -0.062287     -0.036639             0      0.036639      0.062287
                        -4     -0.062287     -0.036639             0      0.036639      0.062287
                      -1.5     -0.062287     -0.036639             0      0.036639      0.062287
                         1     -0.062287     -0.036639             0      0.036639      0.062287
                       3.5     -0.062287     -0.036639             0      0.036639      0.062287
                         6     -0.062287     -0.036639             0      0.036639      0.062287
                       8.5     -0.062287     -0.036639             0      0.036639      0.062287
                        11     -0.062287     -0.036639             0      0.036639      0.062287
            </tableData>
            <tableData breakPoint="0.2">
                         -20           -10             0            10            20
                       -24     -0.062456     -0.036739             0      0.036739      0.062456
                     -21.5     -0.062456     -0.036739             0      0.036739      0.062456
                       -19     -0.062456     -0.036739             0      0.036739      0.062456
                     -16.5     -0.062456     -0.036739             0      0.036739      0.062456
                       -14     -0.062456     -0.036739             0      0.036739      0.062456
                     -11.5     -0.062456     -0.036739             0      0.036739      0.062456
                        -9     -0.062456     -0.036739             0      0.036739      0.062456
                      -6.5     -0.062456     -0.036739             0      0.036739      0.062456
                        -4     -0.062456     -0.036739             0      0.036739      0.062456
                      -1.5     -0.062456     -0.036739             0      0.036739      0.062456
                         1     -0.062456     -0.036739             0      0.036739      0.062456
                       3.5     -0.062456     -0.036739             0      0.036739      0.062456
                         6     -0.062456     -0.036739             0      0.036739      0.062456
                       8.5     -0.062456     -0.036739             0      0.036739      0.062456
                        11     -0.062456     -0.036739             0      0.036739      0.062456
            </tableData>
            <tableData breakPoint="0.3">
                         -20           -10             0            10            20
                       -24     -0.062545     -0.036791             0      0.036791      0.062545
                     -21.5     -0.062545     -0.036791             0      0.036791      0.062545
                       -19     -0.062545     -0.036791             0      0.036791      0.062545
                     -16.5     -0.062545     -0.036791             0      0.036791      0.062545
                       -14     -0.062545     -0.036791             0      0.036791      0.062545
                     -11.5     -0.062545     -0.036791             0      0.036791      0.062545
                        -9     -0.062545     -0.036791             0      0.036791      0.062545
                      -6.5     -0.062545     -0.036791             0      0.036791      0.062545
                        -4     -0.062545     -0.036791             0      0.036791      0.062545
                      -1.5     -0.062545     -0.036791             0      0.036791      0.062545
                         1     -0.062545     -0.036791             0      0.036791      0.062545
                       3.5     -0.062545     -0.036791             0      0.036791      0.062545
                         6     -0.062545     -0.036791             0      0.036791      0.062545
                       8.5     -0.062545     -0.036791             0      0.036791      0.062545
                        11     -0.062545     -0.036791             0      0.036791      0.062545
            </tableData>
          </table>
        </product>
      </function>
    </axis>
    <axis name="PITCH">
      <function name="aero/coefficient/Cm_base">
        <description>Pitching moment coefficient from DATCOM clean case</description>
        <product>
          <property>aero/qbar-area</property>
          <property>metrics/cbarw-ft</property>
          <table>
            <independentVar lookup="row">aero/alpha-deg</independentVar>
            <independentVar lookup="table">velocities/mach</independentVar>
            <tableData breakPoint="0.1">
                       -24         1.2053
                     -21.5         1.1173
                       -19         0.9926
                     -16.5         0.8531
                       -14         0.7177
                     -11.5         0.5911
                        -9         0.4738
                      -6.5         0.3638
                        -4         0.2617
                      -1.5         0.1726
                         1         0.0946
                       3.5         0.0279
                         6        -0.0403
                       8.5        -0.1111
                        11        -0.1673
            </tableData>
            <tableData breakPoint="0.2">
                       -24         1.1937
                     -21.5         1.1094
                       -19         0.9895
                     -16.5         0.8522
                       -14         0.7186
                     -11.5         0.5932
                        -9         0.4761
                      -6.5         0.3661
                        -4         0.2638
                      -1.5         0.1743
                         1         0.0958
                       3.5         0.0286
                         6        -0.0402
                       8.5        -0.1128
                        11         -0.171
            </tableData>
            <tableData breakPoint="0.3">
                       -24         1.0759
                     -21.5         1.0253
                       -19         0.9397
                     -16.5         0.8268
                       -14         0.7084
                     -11.5         0.5911
                        -9         0.4754
                      -6.5         0.3665
                        -4         0.2649
                      -1.5         0.1751
                         1         0.0955
                       3.5         0.0259
                         6        -0.0466
                       8.5        -0.1298
                        11        -0.1973
            </tableData>
          </table>
        </product>
      </function>
      <function name="aero/coefficient/Cmq">
        <description>Pitch damping</description>
        <product>
          <property>aero/qbar-area</property>
          <property>metrics/cbarw-ft</property>
          <product>
            <value>57.295779513082</value>
            <property>velocities/q-aero-rad_sec</property>
            <property>metrics/cbarw-ft</property>
            <value>0.5</value>
            <quotient>
              <value>1.0</value>
              <property>velocities/vt-fps</property>
            </quotient>
          </product>
          <table>
            <independentVar lookup="row">aero/alpha-deg</independentVar>
            <independentVar lookup="table">velocities/mach</independentVar>
            <tableData breakPoint="0.1">
                       -24       -0.03461
                     -21.5       -0.03461
                       -19       -0.03461
                     -16.5       -0.03461
                       -14       -0.03461
                     -11.5       -0.03461
                        -9       -0.03461
                      -6.5       -0.03461
                        -4       -0.03461
                      -1.5       -0.03461
                         1       -0.03461
                       3.5       -0.03461
                         6       -0.03461
                       8.5       -0.03461
                        11       -0.03461
            </tableData>
            <tableData breakPoint="0.2">
                       -24       -0.04837
                     -21.5       -0.04837
                       -19       -0.04837
                     -16.5       -0.04837
                       -14       -0.04837
                     -11.5       -0.04837
                        -9       -0.04837
                      -6.5       -0.04837
                        -4       -0.04837
                      -1.5       -0.04837
                         1       -0.04837
                       3.5       -0.04837
                         6       -0.04837
                       8.5       -0.04837
                        11       -0.04837
            </tableData>
            <tableData breakPoint="0.3">
                       -24        -0.2231
                     -21.5        -0.2231
                       -19        -0.2231
                     -16.5        -0.2231
                       -14        -0.2231
                     -11.5        -0.2231
                        -9        -0.2231
                      -6.5        -0.2231
                        -4        -0.2231
                      -1.5        -0.2231
                         1        -0.2231
                       3.5        -0.2231
                         6        -0.2231
                       8.5        -0.2231
                        11        -0.2231
            </tableData>
          </table>
        </product>
      </function>
      <function name="aero/coefficient/Cmadot">
        <description>Pitch moment due to alpha-dot</description>
        <product>
          <property>aero/qbar-area</property>
          <property>metrics/cbarw-ft</property>
          <product>
            <value>57.295779513082</value>
            <property>aero/alphadot-rad_sec</property>
            <property>metrics/cbarw-ft</property>
            <value>0.5</value>
            <quotient>
              <value>1.0</value>
              <property>velocities/vt-fps</property>
            </quotient>
          </product>
          <table>
            <independentVar lookup="row">aero/alpha-deg</independentVar>
            <independentVar lookup="table">velocities/mach</independentVar>
            <tableData breakPoint="0.1">
                       -24       0.001423
                     -21.5       0.001646
                       -19       0.002117
                     -16.5       0.002553
                       -14       0.002767
                     -11.5         0.0028
                        -9       0.002799
                      -6.5       0.002781
                        -4       0.002824
                      -1.5       0.002945
                         1       0.003048
                       3.5       0.003032
                         6       0.002878
                       8.5       0.002561
                        11       0.001973
            </tableData>
            <tableData breakPoint="0.2">
                       -24     -0.0009604
                     -21.5      -0.001113
                       -19      -0.001431
                     -16.5       -0.00173
                       -14      -0.001882
                     -11.5      -0.001905
                        -9      -0.001905
                      -6.5      -0.001894
                        -4      -0.001924
                      -1.5      -0.002005
                         1      -0.002075
                       3.5      -0.002063
                         6      -0.001953
                       8.5      -0.001734
                        11      -0.001345
            </tableData>
            <tableData breakPoint="0.3">
                       -24       -0.03456
                     -21.5       -0.03464
                       -19       -0.04017
                     -16.5       -0.05133
                       -14       -0.05897
                     -11.5       -0.06117
                        -9       -0.06152
                      -6.5       -0.06149
                        -4       -0.06249
                      -1.5       -0.06483
                         1       -0.06669
                       3.5       -0.06534
                         6       -0.05885
                       8.5       -0.04935
                        11       -0.03435
            </tableData>
          </table>
        </product>
      </function>
    </axis>
    <axis name="YAW">
      <function name="aero/coefficient/Cn_beta">
        <description>Yawing moment due to sideslip: DATCOM CNB_per_deg multiplied by beta_deg</description>
        <product>
          <property>aero/qbar-area</property>
          <property>metrics/bw-ft</property>
          <property>aero/beta-deg</property>
          <table>
            <independentVar lookup="row">aero/alpha-deg</independentVar>
            <independentVar lookup="table">velocities/mach</independentVar>
            <tableData breakPoint="0.1">
                       -24       0.005088
                     -21.5       0.005088
                       -19       0.005088
                     -16.5       0.005088
                       -14       0.005088
                     -11.5       0.005088
                        -9       0.005088
                      -6.5       0.005088
                        -4       0.005088
                      -1.5       0.005088
                         1       0.005088
                       3.5       0.005088
                         6       0.005088
                       8.5       0.005088
                        11       0.005088
            </tableData>
            <tableData breakPoint="0.2">
                       -24       0.005174
                     -21.5       0.005174
                       -19       0.005174
                     -16.5       0.005174
                       -14       0.005174
                     -11.5       0.005174
                        -9       0.005174
                      -6.5       0.005174
                        -4       0.005174
                      -1.5       0.005174
                         1       0.005174
                       3.5       0.005174
                         6       0.005174
                       8.5       0.005174
                        11       0.005174
            </tableData>
            <tableData breakPoint="0.3">
                       -24       0.005246
                     -21.5       0.005246
                       -19       0.005246
                     -16.5       0.005246
                       -14       0.005246
                     -11.5       0.005246
                        -9       0.005246
                      -6.5       0.005246
                        -4       0.005246
                      -1.5       0.005246
                         1       0.005246
                       3.5       0.005246
                         6       0.005246
                       8.5       0.005246
                        11       0.005246
            </tableData>
          </table>
        </product>
      </function>
      <function name="aero/coefficient/Cnp">
        <description>Yaw moment due to roll rate</description>
        <product>
          <property>aero/qbar-area</property>
          <property>metrics/bw-ft</property>
          <product>
            <value>57.295779513082</value>
            <property>velocities/p-aero-rad_sec</property>
            <property>metrics/bw-ft</property>
            <value>0.5</value>
            <quotient>
              <value>1.0</value>
              <property>velocities/vt-fps</property>
            </quotient>
          </product>
          <table>
            <independentVar lookup="row">aero/alpha-deg</independentVar>
            <independentVar lookup="table">velocities/mach</independentVar>
            <tableData breakPoint="0.1">
                       -24       0.004062
                     -21.5         0.0038
                       -19       0.003417
                     -16.5       0.002912
                       -14       0.002326
                     -11.5       0.001735
                        -9       0.001146
                      -6.5      0.0005682
                        -4      2.487e-06
                      -1.5     -0.0005917
                         1      -0.001225
                       3.5        -0.0019
                         6       -0.00265
                       8.5      -0.005413
                        11      -0.003387
            </tableData>
            <tableData breakPoint="0.2">
                       -24       0.004062
                     -21.5       0.003802
                       -19       0.003422
                     -16.5       0.002921
                       -14       0.002335
                     -11.5       0.001742
                        -9       0.001151
                      -6.5       0.000571
                        -4      2.714e-06
                      -1.5     -0.0005938
                         1      -0.001229
                       3.5      -0.001906
                         6      -0.002656
                       8.5      -0.005674
                        11      -0.003394
            </tableData>
            <tableData breakPoint="0.3">
                       -24       0.003896
                     -21.5       0.003589
                       -19       0.003289
                     -16.5       0.002878
                       -14       0.002338
                     -11.5       0.001753
                        -9       0.001164
                      -6.5      0.0005789
                        -4      1.519e-06
                      -1.5     -0.0006024
                         1      -0.001241
                       3.5      -0.001919
                         6      -0.002674
                       8.5      -0.002071
                        11        -0.0033
            </tableData>
          </table>
        </product>
      </function>
      <function name="aero/coefficient/Cnr">
        <description>Yaw damping</description>
        <product>
          <property>aero/qbar-area</property>
          <property>metrics/bw-ft</property>
          <product>
            <value>57.295779513082</value>
            <property>velocities/r-aero-rad_sec</property>
            <property>metrics/bw-ft</property>
            <value>0.5</value>
            <quotient>
              <value>1.0</value>
              <property>velocities/vt-fps</property>
            </quotient>
          </product>
          <table>
            <independentVar lookup="row">aero/alpha-deg</independentVar>
            <independentVar lookup="table">velocities/mach</independentVar>
            <tableData breakPoint="0.1">
                       -24      -0.002474
                     -21.5      -0.002535
                       -19      -0.002567
                     -16.5      -0.002578
                       -14      -0.002589
                     -11.5      -0.002617
                        -9      -0.002662
                      -6.5      -0.002721
                        -4      -0.002792
                      -1.5      -0.002873
                         1      -0.002967
                       3.5      -0.003076
                         6      -0.003201
                       8.5      -0.003331
                        11      -0.003438
            </tableData>
            <tableData breakPoint="0.2">
                       -24      -0.002477
                     -21.5      -0.002539
                       -19      -0.002572
                     -16.5      -0.002584
                       -14      -0.002594
                     -11.5      -0.002622
                        -9      -0.002667
                      -6.5      -0.002726
                        -4      -0.002797
                      -1.5      -0.002879
                         1      -0.002973
                       3.5      -0.003083
                         6      -0.003209
                       8.5       -0.00334
                        11      -0.003447
            </tableData>
            <tableData breakPoint="0.3">
                       -24      -0.002439
                     -21.5      -0.002494
                       -19      -0.002553
                     -16.5      -0.002589
                       -14       -0.00261
                     -11.5       -0.00264
                        -9      -0.002686
                      -6.5      -0.002746
                        -4      -0.002817
                      -1.5      -0.002899
                         1      -0.002994
                       3.5      -0.003103
                         6      -0.003225
                       8.5      -0.003332
                        11      -0.003414
            </tableData>
          </table>
        </product>
      </function>
      <function name="aero/coefficient/Cn_da">
        <description>Yawing moment increment due to aileron deflection</description>
        <product>
          <property>aero/qbar-area</property>
          <property>metrics/bw-ft</property>
          <table>
            <independentVar lookup="row">aero/alpha-deg</independentVar>
            <independentVar lookup="column">fcs/effective-aileron-pos-deg</independentVar>
            <independentVar lookup="table">velocities/mach</independentVar>
            <tableData breakPoint="0.1">
                         -20           -10             0            10            20
                       -24      -0.01207     -0.007102             0      0.007102       0.01207
                     -21.5       -0.0113     -0.006647             0      0.006647        0.0113
                       -19       -0.0101     -0.005943             0      0.005943        0.0101
                     -16.5     -0.008473     -0.004984             0      0.004984      0.008473
                       -14     -0.006572     -0.003866             0      0.003866      0.006572
                     -11.5     -0.004686     -0.002757             0      0.002757      0.004686
                        -9     -0.002844     -0.001673             0      0.001673      0.002844
                      -6.5     -0.001071    -0.0006297             0     0.0006297      0.001071
                        -4     0.0006242     0.0003672             0    -0.0003672    -0.0006242
                      -1.5      0.002389      0.001405             0     -0.001405     -0.002389
                         1      0.004246      0.002497             0     -0.002497     -0.004246
                       3.5       0.00617       0.00363             0      -0.00363      -0.00617
                         6      0.008136      0.004786             0     -0.004786     -0.008136
                       8.5      0.009973      0.005866             0     -0.005866     -0.009973
                        11       0.01135      0.006677             0     -0.006677      -0.01135
            </tableData>
            <tableData breakPoint="0.2">
                         -20           -10             0            10            20
                       -24      -0.01213     -0.007137             0      0.007137       0.01213
                     -21.5      -0.01137     -0.006687             0      0.006687       0.01137
                       -19      -0.01017     -0.005984             0      0.005984       0.01017
                     -16.5     -0.008548     -0.005028             0      0.005028      0.008548
                       -14     -0.006633     -0.003902             0      0.003902      0.006633
                     -11.5     -0.004732     -0.002784             0      0.002784      0.004732
                        -9     -0.002873      -0.00169             0       0.00169      0.002873
                      -6.5     -0.001082    -0.0006365             0     0.0006365      0.001082
                        -4     0.0006309     0.0003711             0    -0.0003711    -0.0006309
                      -1.5      0.002413       0.00142             0      -0.00142     -0.002413
                         1      0.004288      0.002522             0     -0.002522     -0.004288
                       3.5      0.006229      0.003664             0     -0.003664     -0.006229
                         6       0.00821      0.004829             0     -0.004829      -0.00821
                       8.5       0.01004      0.005908             0     -0.005908      -0.01004
                        11       0.01142      0.006719             0     -0.006719      -0.01142
            </tableData>
            <tableData breakPoint="0.3">
                         -20           -10             0            10            20
                       -24      -0.01151     -0.006773             0      0.006773       0.01151
                     -21.5      -0.01057     -0.006219             0      0.006219       0.01057
                       -19     -0.009677     -0.005692             0      0.005692      0.009677
                     -16.5     -0.008364      -0.00492             0       0.00492      0.008364
                       -14     -0.006609     -0.003888             0      0.003888      0.006609
                     -11.5     -0.004739     -0.002788             0      0.002788      0.004739
                        -9     -0.002892     -0.001701             0      0.001701      0.002892
                      -6.5     -0.001095    -0.0006443             0     0.0006443      0.001095
                        -4     0.0006397     0.0003763             0    -0.0003763    -0.0006397
                      -1.5      0.002433      0.001431             0     -0.001431     -0.002433
                         1        0.0043      0.002529             0     -0.002529       -0.0043
                       3.5      0.006215      0.003656             0     -0.003656     -0.006215
                         6      0.008125       0.00478             0      -0.00478     -0.008125
                       8.5      0.009602      0.005648             0     -0.005648     -0.009602
                        11       0.01069      0.006289             0     -0.006289      -0.01069
            </tableData>
          </table>
        </product>
      </function>
    </axis>
  </aerodynamics>
</fdm_config>
