<?xml version='1.0' encoding='utf-8'?>
<aerodynamics>
  <alphalimits unit="DEG">
    <min>-24</min>
    <max>11</max>
  </alphalimits>
  <function name="aero/coefficient/alpha_validity_gate">
    <description>DATCOM 테이블 유효범위(-24~11도) 밖에서 공력 계수를 0으로 부드럽게 억제하는 게이트. 순수 수직상승/호버 시 전진속도가 0에 가까워 alpha=atan2(w,u) 계산이 ±90도 부근에서 불안정해지는데, 이때 미검증 외삽값이 실제 힘/모멘트로 발산하는 것을 막기 위함(2026-08-20 발견). alpha가 테이블 범위 안이면 1.0(DATCOM 값 그대로), ±90도 이상이면 0.0(공력 완전 차단), 그 사이는 선형 보간으로 연속적으로 램프됨.</description>
    <table>
      <independentVar lookup="row">aero/alpha-deg</independentVar>
      <tableData>
        -90   0.0
        -24   1.0
         11   1.0
         90   0.0
      </tableData>
    </table>
  </function>
  <axis name="LIFT">
    <function name="aero/coefficient/CL_base">
      <description>DATCOM clean case 기반 양력계수</description>
      <product>
        <property>aero/qbar-area</property>
        <property>aero/coefficient/alpha_validity_gate</property>
        <table>
          <independentVar lookup="row">aero/alpha-deg</independentVar>
          <independentVar lookup="column">velocities/mach</independentVar>
          <tableData>
            0.1 0.2 0.3
            -24 -1.913 -1.916 -1.805
            -21.5 -1.788 -1.793 -1.67
            -19 -1.601 -1.607 -1.53
            -16.5 -1.354 -1.361 -1.33
            -14 -1.073 -1.079 -1.072
            -11.5 -0.794 -0.799 -0.798
            -9 -0.521 -0.525 -0.526
            -6.5 -0.258 -0.26 -0.261
            -4 -0.005 -0.005 -0.004
            -1.5 0.255 0.256 0.258
            1 0.523 0.527 0.527
            3.5 0.799 0.804 0.801
            6 1.081 1.087 1.076
            8.5 1.348 1.354 1.301
            11 1.553 1.559 1.472
          </tableData>
        </table>
      </product>
    </function>
    <function name="aero/coefficient/CLq">
      <description>Pitch rate에 의한 양력 성분</description>
      <product>
        <property>aero/qbar-area</property>
        <property>aero/coefficient/alpha_validity_gate</property>
        <product>
          <value>57.295779513082</value>
          <property>velocities/q-aero-rad_sec</property>
          <property>aero/ci2vel</property>
        </product>
        <table>
          <independentVar lookup="row">aero/alpha-deg</independentVar>
          <independentVar lookup="column">velocities/mach</independentVar>
          <tableData>
            0.1 0.2 0.3
            -24 0.03341 0.03807 0.09216
            -21.5 0.03341 0.03807 0.09216
            -19 0.03341 0.03807 0.09216
            -16.5 0.03341 0.03807 0.09216
            -14 0.03341 0.03807 0.09216
            -11.5 0.03341 0.03807 0.09216
            -9 0.03341 0.03807 0.09216
            -6.5 0.03341 0.03807 0.09216
            -4 0.03341 0.03807 0.09216
            -1.5 0.03341 0.03807 0.09216
            1 0.03341 0.03807 0.09216
            3.5 0.03341 0.03807 0.09216
            6 0.03341 0.03807 0.09216
            8.5 0.03341 0.03807 0.09216
            11 0.03341 0.03807 0.09216
          </tableData>
        </table>
      </product>
    </function>
    <function name="aero/coefficient/CLadot">
      <description>받음각 변화율(alpha-dot)에 의한 양력 성분</description>
      <product>
        <property>aero/qbar-area</property>
        <property>aero/coefficient/alpha_validity_gate</property>
        <product>
          <value>57.295779513082</value>
          <property>aero/alphadot-rad_sec</property>
          <property>aero/ci2vel</property>
        </product>
        <table>
          <independentVar lookup="row">aero/alpha-deg</independentVar>
          <independentVar lookup="column">velocities/mach</independentVar>
          <tableData>
            0.1 0.2 0.3
            -24 -0.0004351 0.0002935 0.01056
            -21.5 -0.0005032 0.00034 0.01059
            -19 -0.0006471 0.0004372 0.01228
            -16.5 -0.0007802 0.0005288 0.01569
            -14 -0.0008457 0.0005753 0.01802
            -11.5 -0.0008557 0.0005823 0.01869
            -9 -0.0008554 0.0005824 0.0188
            -6.5 -0.0008499 0.0005789 0.01879
            -4 -0.0008633 0.000588 0.0191
            -1.5 -0.0009 0.0006128 0.01981
            1 -0.0009318 0.0006342 0.02038
            3.5 -0.0009269 0.0006304 0.01997
            6 -0.0008798 0.0005968 0.01799
            8.5 -0.0007828 0.0005299 0.01508
            11 -0.0006031 0.0004112 0.0105
          </tableData>
        </table>
      </product>
    </function>
    <function name="aero/coefficient/CLde">
      <description>[임시 placeholder, 2026-08-20] 이 기체는 V-tail(러더베이터)이라 AVL/DATCOM이 러더베이터 혼합 효과를 직접 산출하지 못해 실측/해석 계수가 아직 없음(사용자 확인, 별도 검토 중). 승강타 명령이 실제 피치 응답을 전혀 만들지 못하던 문제(TODO-20260820-1300-001)의 진단 실험용으로, 레퍼런스 standard_vtol_demo.xml(A)의 계수를 그대로 임시 적용. 정식 V-tail 공력데이터 확보 시 교체 필요. alpha_validity_gate 미적용(제어 미분항은 테이블 유효범위와 무관하게 항상 유효하다고 가정, A와 동일한 설계).</description>
      <product>
        <property>aero/qbar-area</property>
        <property>fcs/elevator-pos-rad</property>
        <value>-0.35</value>
      </product>
    </function>
  </axis>
  <axis name="DRAG">
    <function name="aero/coefficient/CD_base">
      <description>DATCOM clean case 기반 항력계수</description>
      <product>
        <property>aero/qbar-area</property>
        <property>aero/coefficient/alpha_validity_gate</property>
        <table>
          <independentVar lookup="row">aero/alpha-deg</independentVar>
          <independentVar lookup="column">velocities/mach</independentVar>
          <tableData>
            0.1 0.2 0.3
            -24 0.197 0.185 0.166
            -21.5 0.174 0.163 0.145
            -19 0.144 0.135 0.124
            -16.5 0.112 0.105 0.099
            -14 0.083 0.077 0.073
            -11.5 0.06 0.055 0.052
            -9 0.044 0.039 0.037
            -6.5 0.033 0.029 0.027
            -4 0.029 0.025 0.023
            -1.5 0.03 0.026 0.025
            1 0.037 0.033 0.031
            3.5 0.05 0.046 0.044
            6 0.069 0.065 0.063
            8.5 0.092 0.089 0.083
            11 0.116 0.112 0.102
          </tableData>
        </table>
      </product>
    </function>
  </axis>
  <axis name="SIDE">
    <function name="aero/coefficient/CYp">
      <description>Roll rate에 의한 측력 성분</description>
      <product>
        <property>aero/qbar-area</property>
        <property>aero/coefficient/alpha_validity_gate</property>
        <product>
          <value>57.295779513082</value>
          <property>velocities/p-aero-rad_sec</property>
          <property>aero/bi2vel</property>
        </product>
        <table>
          <independentVar lookup="row">aero/alpha-deg</independentVar>
          <independentVar lookup="column">velocities/mach</independentVar>
          <tableData>
            0.1 0.2 0.3
            -24 -0.001606 -0.001634 -0.001837
            -21.5 -0.001456 -0.001479 -0.001715
            -19 -0.001393 -0.001412 -0.001575
            -16.5 -0.001417 -0.001431 -0.001519
            -14 -0.001492 -0.001505 -0.001553
            -11.5 -0.001555 -0.001568 -0.001604
            -9 -0.001603 -0.001615 -0.001642
            -6.5 -0.00163 -0.001642 -0.001665
            -4 -0.001635 -0.001647 -0.001669
            -1.5 -0.001655 -0.001667 -0.001685
            1 -0.001699 -0.001711 -0.00172
            3.5 -0.001771 -0.001782 -0.001776
            6 -0.001897 -0.001906 -0.001878
            8.5 -0.00352 -0.003696 -0.001162
            11 -0.00156 -0.001568 -0.001483
          </tableData>
        </table>
      </product>
    </function>
  </axis>
  <axis name="ROLL">
    <function name="aero/coefficient/Cl_beta">
      <description>Sideslip에 의한 롤 모멘트: DATCOM CLB_per_deg에 beta_deg를 곱하여 계산</description>
      <product>
        <property>aero/qbar-area</property>
        <property>aero/coefficient/alpha_validity_gate</property>
        <property>metrics/bw-ft</property>
        <property>aero/beta-deg</property>
        <table>
          <independentVar lookup="row">aero/alpha-deg</independentVar>
          <independentVar lookup="column">velocities/mach</independentVar>
          <tableData>
            0.1 0.2 0.3
            -24 -0.002811 -0.002828 -0.00288
            -21.5 -0.002667 -0.002683 -0.002744
            -19 -0.002531 -0.002546 -0.002596
            -16.5 -0.002406 -0.00242 -0.002458
            -14 -0.002288 -0.002301 -0.002332
            -11.5 -0.00217 -0.002183 -0.00221
            -9 -0.002048 -0.00206 -0.002085
            -6.5 -0.00192 -0.001932 -0.001955
            -4 -0.001787 -0.001799 -0.001821
            -1.5 -0.001653 -0.001664 -0.001685
            1 -0.001518 -0.001529 -0.001548
            3.5 -0.001383 -0.001394 -0.001411
            6 -0.001249 -0.001259 -0.001273
            8.5 -0.001112 -0.001121 -0.001124
            11 -0.0009633 -0.0009713 -0.000966
          </tableData>
        </table>
      </product>
    </function>
    <function name="aero/coefficient/Clp">
      <description>롤 댐핑</description>
      <product>
        <property>aero/qbar-area</property>
        <property>aero/coefficient/alpha_validity_gate</property>
        <property>metrics/bw-ft</property>
        <product>
          <value>57.295779513082</value>
          <property>velocities/p-aero-rad_sec</property>
          <property>aero/bi2vel</property>
        </product>
        <table>
          <independentVar lookup="row">aero/alpha-deg</independentVar>
          <independentVar lookup="column">velocities/mach</independentVar>
          <tableData>
            0.1 0.2 0.3
            -24 -0.000113 -7.693e-05 0.002699
            -21.5 0.0005875 0.0006763 0.002674
            -19 0.0013 0.001433 0.003488
            -16.5 0.001906 0.002086 0.005204
            -14 0.002193 0.002403 0.006354
            -11.5 0.002251 0.00246 0.006622
            -9 0.002259 0.002465 0.006569
            -6.5 0.002225 0.002425 0.006429
            -4 0.002269 0.00247 0.006473
            -1.5 0.002414 0.002621 0.006752
            1 0.002535 0.002749 0.006989
            3.5 0.002597 0.002815 0.007059
            6 0.002501 0.0027 0.006207
            8.5 0.002042 0.0022 0.004632
            11 0.001391 0.001505 0.002459
          </tableData>
        </table>
      </product>
    </function>
    <function name="aero/coefficient/Clr">
      <description>Yaw rate에 의한 롤 모멘트</description>
      <product>
        <property>aero/qbar-area</property>
        <property>aero/coefficient/alpha_validity_gate</property>
        <property>metrics/bw-ft</property>
        <product>
          <value>57.295779513082</value>
          <property>velocities/r-aero-rad_sec</property>
          <property>aero/bi2vel</property>
        </product>
        <table>
          <independentVar lookup="row">aero/alpha-deg</independentVar>
          <independentVar lookup="column">velocities/mach</independentVar>
          <tableData>
            0.1 0.2 0.3
            -24 -0.005408 -0.005504 -0.005288
            -21.5 -0.005025 -0.005121 -0.004796
            -19 -0.004419 -0.00451 -0.004341
            -16.5 -0.003584 -0.00367 -0.003659
            -14 -0.002609 -0.002676 -0.002734
            -11.5 -0.001652 -0.001699 -0.001752
            -9 -0.0007263 -0.000754 -0.0007918
            -6.5 0.0001535 0.0001453 0.0001321
            -4 0.0009832 0.0009945 0.001014
            -1.5 0.001845 0.001876 0.001923
            1 0.002754 0.002804 0.002869
            3.5 0.003695 0.003766 0.003838
            6 0.004656 0.004746 0.004801
            8.5 0.005543 0.005641 0.005514
            11 0.006176 0.006281 0.006006
          </tableData>
        </table>
      </product>
    </function>
    <function name="aero/coefficient/Cl_da">
      <description>에일러론 편향에 따른 롤 모멘트 증분</description>
      <product>
        <property>aero/qbar-area</property>
        <property>aero/coefficient/alpha_validity_gate</property>
        <property>metrics/bw-ft</property>
        <table>
          <independentVar lookup="row">aero/alpha-deg</independentVar>
          <independentVar lookup="column">fcs/effective-aileron-pos-deg</independentVar>
          <independentVar lookup="table">velocities/mach</independentVar>
          <tableData breakPoint="0.1">
                         -20           -10             0            10            20
                       -24     -0.062287     -0.036639             0      0.036639      0.062287
                     -21.5     -0.062287     -0.036639             0      0.036639      0.062287
                       -19     -0.062287     -0.036639             0      0.036639      0.062287
                     -16.5     -0.062287     -0.036639             0      0.036639      0.062287
                       -14     -0.062287     -0.036639             0      0.036639      0.062287
                     -11.5     -0.062287     -0.036639             0      0.036639      0.062287
                        -9     -0.062287     -0.036639             0      0.036639      0.062287
                      -6.5     -0.062287     -0.036639             0      0.036639      0.062287
                        -4     -0.062287     -0.036639             0      0.036639      0.062287
                      -1.5     -0.062287     -0.036639             0      0.036639      0.062287
                         1     -0.062287     -0.036639             0      0.036639      0.062287
                       3.5     -0.062287     -0.036639             0      0.036639      0.062287
                         6     -0.062287     -0.036639             0      0.036639      0.062287
                       8.5     -0.062287     -0.036639             0      0.036639      0.062287
                        11     -0.062287     -0.036639             0      0.036639      0.062287
            </tableData>
          <tableData breakPoint="0.2">
                         -20           -10             0            10            20
                       -24     -0.062456     -0.036739             0      0.036739      0.062456
                     -21.5     -0.062456     -0.036739             0      0.036739      0.062456
                       -19     -0.062456     -0.036739             0      0.036739      0.062456
                     -16.5     -0.062456     -0.036739             0      0.036739      0.062456
                       -14     -0.062456     -0.036739             0      0.036739      0.062456
                     -11.5     -0.062456     -0.036739             0      0.036739      0.062456
                        -9     -0.062456     -0.036739             0      0.036739      0.062456
                      -6.5     -0.062456     -0.036739             0      0.036739      0.062456
                        -4     -0.062456     -0.036739             0      0.036739      0.062456
                      -1.5     -0.062456     -0.036739             0      0.036739      0.062456
                         1     -0.062456     -0.036739             0      0.036739      0.062456
                       3.5     -0.062456     -0.036739             0      0.036739      0.062456
                         6     -0.062456     -0.036739             0      0.036739      0.062456
                       8.5     -0.062456     -0.036739             0      0.036739      0.062456
                        11     -0.062456     -0.036739             0      0.036739      0.062456
            </tableData>
          <tableData breakPoint="0.3">
                         -20           -10             0            10            20
                       -24     -0.062545     -0.036791             0      0.036791      0.062545
                     -21.5     -0.062545     -0.036791             0      0.036791      0.062545
                       -19     -0.062545     -0.036791             0      0.036791      0.062545
                     -16.5     -0.062545     -0.036791             0      0.036791      0.062545
                       -14     -0.062545     -0.036791             0      0.036791      0.062545
                     -11.5     -0.062545     -0.036791             0      0.036791      0.062545
                        -9     -0.062545     -0.036791             0      0.036791      0.062545
                      -6.5     -0.062545     -0.036791             0      0.036791      0.062545
                        -4     -0.062545     -0.036791             0      0.036791      0.062545
                      -1.5     -0.062545     -0.036791             0      0.036791      0.062545
                         1     -0.062545     -0.036791             0      0.036791      0.062545
                       3.5     -0.062545     -0.036791             0      0.036791      0.062545
                         6     -0.062545     -0.036791             0      0.036791      0.062545
                       8.5     -0.062545     -0.036791             0      0.036791      0.062545
                        11     -0.062545     -0.036791             0      0.036791      0.062545
            </tableData>
        </table>
      </product>
    </function>
  </axis>
  <axis name="PITCH">
    <function name="aero/coefficient/Cm_base">
      <description>DATCOM clean case 기반 피칭 모멘트 계수</description>
      <product>
        <property>aero/qbar-area</property>
        <property>aero/coefficient/alpha_validity_gate</property>
        <property>metrics/cbarw-ft</property>
        <table>
          <independentVar lookup="row">aero/alpha-deg</independentVar>
          <independentVar lookup="column">velocities/mach</independentVar>
          <tableData>
            0.1 0.2 0.3
            -24 1.2053 1.1937 1.0759
            -21.5 1.1173 1.1094 1.0253
            -19 0.9926 0.9895 0.9397
            -16.5 0.8531 0.8522 0.8268
            -14 0.7177 0.7186 0.7084
            -11.5 0.5911 0.5932 0.5911
            -9 0.4738 0.4761 0.4754
            -6.5 0.3638 0.3661 0.3665
            -4 0.2617 0.2638 0.2649
            -1.5 0.1726 0.1743 0.1751
            1 0.0946 0.0958 0.0955
            3.5 0.0279 0.0286 0.0259
            6 -0.0403 -0.0402 -0.0466
            8.5 -0.1111 -0.1128 -0.1298
            11 -0.1673 -0.171 -0.1973
          </tableData>
        </table>
      </product>
    </function>
    <function name="aero/coefficient/Cmq">
      <description>피치 댐핑</description>
      <product>
        <property>aero/qbar-area</property>
        <property>aero/coefficient/alpha_validity_gate</property>
        <property>metrics/cbarw-ft</property>
        <product>
          <value>57.295779513082</value>
          <property>velocities/q-aero-rad_sec</property>
          <property>aero/ci2vel</property>
        </product>
        <table>
          <independentVar lookup="row">aero/alpha-deg</independentVar>
          <independentVar lookup="column">velocities/mach</independentVar>
          <tableData>
            0.1 0.2 0.3
            -24 -0.03461 -0.04837 -0.2231
            -21.5 -0.03461 -0.04837 -0.2231
            -19 -0.03461 -0.04837 -0.2231
            -16.5 -0.03461 -0.04837 -0.2231
            -14 -0.03461 -0.04837 -0.2231
            -11.5 -0.03461 -0.04837 -0.2231
            -9 -0.03461 -0.04837 -0.2231
            -6.5 -0.03461 -0.04837 -0.2231
            -4 -0.03461 -0.04837 -0.2231
            -1.5 -0.03461 -0.04837 -0.2231
            1 -0.03461 -0.04837 -0.2231
            3.5 -0.03461 -0.04837 -0.2231
            6 -0.03461 -0.04837 -0.2231
            8.5 -0.03461 -0.04837 -0.2231
            11 -0.03461 -0.04837 -0.2231
          </tableData>
        </table>
      </product>
    </function>
    <function name="aero/coefficient/Cmadot">
      <description>받음각 변화율(alpha-dot)에 의한 피치 모멘트</description>
      <product>
        <property>aero/qbar-area</property>
        <property>aero/coefficient/alpha_validity_gate</property>
        <property>metrics/cbarw-ft</property>
        <product>
          <value>57.295779513082</value>
          <property>aero/alphadot-rad_sec</property>
          <property>aero/ci2vel</property>
        </product>
        <table>
          <independentVar lookup="row">aero/alpha-deg</independentVar>
          <independentVar lookup="column">velocities/mach</independentVar>
          <tableData>
            0.1 0.2 0.3
            -24 0.001423 -0.0009604 -0.03456
            -21.5 0.001646 -0.001113 -0.03464
            -19 0.002117 -0.001431 -0.04017
            -16.5 0.002553 -0.00173 -0.05133
            -14 0.002767 -0.001882 -0.05897
            -11.5 0.0028 -0.001905 -0.06117
            -9 0.002799 -0.001905 -0.06152
            -6.5 0.002781 -0.001894 -0.06149
            -4 0.002824 -0.001924 -0.06249
            -1.5 0.002945 -0.002005 -0.06483
            1 0.003048 -0.002075 -0.06669
            3.5 0.003032 -0.002063 -0.06534
            6 0.002878 -0.001953 -0.05885
            8.5 0.002561 -0.001734 -0.04935
            11 0.001973 -0.001345 -0.03435
          </tableData>
        </table>
      </product>
    </function>
    <function name="aero/coefficient/Cmde">
      <description>[임시 placeholder, 2026-08-20] CLde와 동일 사유(V-tail 러더베이터 데이터 미확보). 레퍼런스 standard_vtol_demo.xml(A)의 계수를 그대로 임시 적용해 승강타에 최소한의 피치 제어권을 부여, quad-chute(전환 중 고도손실 20m 초과) 원인 진단 실험용. 정식 데이터 확보 시 교체 필요.</description>
      <product>
        <property>aero/qbar-area</property>
        <property>metrics/cbarw-ft</property>
        <property>fcs/elevator-pos-rad</property>
        <value>1.10</value>
      </product>
    </function>
  </axis>
  <axis name="YAW">
    <function name="aero/coefficient/Cn_beta">
      <description>Sideslip에 의한 요 모멘트: DATCOM CNB_per_deg에 beta_deg를 곱하여 계산</description>
      <product>
        <property>aero/qbar-area</property>
        <property>aero/coefficient/alpha_validity_gate</property>
        <property>metrics/bw-ft</property>
        <property>aero/beta-deg</property>
        <table>
          <independentVar lookup="row">aero/alpha-deg</independentVar>
          <independentVar lookup="column">velocities/mach</independentVar>
          <tableData>
            0.1 0.2 0.3
            -24 0.005088 0.005174 0.005246
            -21.5 0.005088 0.005174 0.005246
            -19 0.005088 0.005174 0.005246
            -16.5 0.005088 0.005174 0.005246
            -14 0.005088 0.005174 0.005246
            -11.5 0.005088 0.005174 0.005246
            -9 0.005088 0.005174 0.005246
            -6.5 0.005088 0.005174 0.005246
            -4 0.005088 0.005174 0.005246
            -1.5 0.005088 0.005174 0.005246
            1 0.005088 0.005174 0.005246
            3.5 0.005088 0.005174 0.005246
            6 0.005088 0.005174 0.005246
            8.5 0.005088 0.005174 0.005246
            11 0.005088 0.005174 0.005246
          </tableData>
        </table>
      </product>
    </function>
    <function name="aero/coefficient/Cnp">
      <description>Roll rate에 의한 요 모멘트</description>
      <product>
        <property>aero/qbar-area</property>
        <property>aero/coefficient/alpha_validity_gate</property>
        <property>metrics/bw-ft</property>
        <product>
          <value>57.295779513082</value>
          <property>velocities/p-aero-rad_sec</property>
          <property>aero/bi2vel</property>
        </product>
        <table>
          <independentVar lookup="row">aero/alpha-deg</independentVar>
          <independentVar lookup="column">velocities/mach</independentVar>
          <tableData>
            0.1 0.2 0.3
            -24 0.004062 0.004062 0.003896
            -21.5 0.0038 0.003802 0.003589
            -19 0.003417 0.003422 0.003289
            -16.5 0.002912 0.002921 0.002878
            -14 0.002326 0.002335 0.002338
            -11.5 0.001735 0.001742 0.001753
            -9 0.001146 0.001151 0.001164
            -6.5 0.0005682 0.000571 0.0005789
            -4 2.487e-06 2.714e-06 1.519e-06
            -1.5 -0.0005917 -0.0005938 -0.0006024
            1 -0.001225 -0.001229 -0.001241
            3.5 -0.0019 -0.001906 -0.001919
            6 -0.00265 -0.002656 -0.002674
            8.5 -0.005413 -0.005674 -0.002071
            11 -0.003387 -0.003394 -0.0033
          </tableData>
        </table>
      </product>
    </function>
    <function name="aero/coefficient/Cnr">
      <description>요 댐핑</description>
      <product>
        <property>aero/qbar-area</property>
        <property>aero/coefficient/alpha_validity_gate</property>
        <property>metrics/bw-ft</property>
        <product>
          <value>57.295779513082</value>
          <property>velocities/r-aero-rad_sec</property>
          <property>aero/bi2vel</property>
        </product>
        <table>
          <independentVar lookup="row">aero/alpha-deg</independentVar>
          <independentVar lookup="column">velocities/mach</independentVar>
          <tableData>
            0.1 0.2 0.3
            -24 -0.002474 -0.002477 -0.002439
            -21.5 -0.002535 -0.002539 -0.002494
            -19 -0.002567 -0.002572 -0.002553
            -16.5 -0.002578 -0.002584 -0.002589
            -14 -0.002589 -0.002594 -0.00261
            -11.5 -0.002617 -0.002622 -0.00264
            -9 -0.002662 -0.002667 -0.002686
            -6.5 -0.002721 -0.002726 -0.002746
            -4 -0.002792 -0.002797 -0.002817
            -1.5 -0.002873 -0.002879 -0.002899
            1 -0.002967 -0.002973 -0.002994
            3.5 -0.003076 -0.003083 -0.003103
            6 -0.003201 -0.003209 -0.003225
            8.5 -0.003331 -0.00334 -0.003332
            11 -0.003438 -0.003447 -0.003414
          </tableData>
        </table>
      </product>
    </function>
    <function name="aero/coefficient/Cn_da">
      <description>에일러론 편향에 따른 요 모멘트 증분</description>
      <product>
        <property>aero/qbar-area</property>
        <property>aero/coefficient/alpha_validity_gate</property>
        <property>metrics/bw-ft</property>
        <table>
          <independentVar lookup="row">aero/alpha-deg</independentVar>
          <independentVar lookup="column">fcs/effective-aileron-pos-deg</independentVar>
          <independentVar lookup="table">velocities/mach</independentVar>
          <tableData breakPoint="0.1">
                         -20           -10             0            10            20
                       -24      -0.01207     -0.007102             0      0.007102       0.01207
                     -21.5       -0.0113     -0.006647             0      0.006647        0.0113
                       -19       -0.0101     -0.005943             0      0.005943        0.0101
                     -16.5     -0.008473     -0.004984             0      0.004984      0.008473
                       -14     -0.006572     -0.003866             0      0.003866      0.006572
                     -11.5     -0.004686     -0.002757             0      0.002757      0.004686
                        -9     -0.002844     -0.001673             0      0.001673      0.002844
                      -6.5     -0.001071    -0.0006297             0     0.0006297      0.001071
                        -4     0.0006242     0.0003672             0    -0.0003672    -0.0006242
                      -1.5      0.002389      0.001405             0     -0.001405     -0.002389
                         1      0.004246      0.002497             0     -0.002497     -0.004246
                       3.5       0.00617       0.00363             0      -0.00363      -0.00617
                         6      0.008136      0.004786             0     -0.004786     -0.008136
                       8.5      0.009973      0.005866             0     -0.005866     -0.009973
                        11       0.01135      0.006677             0     -0.006677      -0.01135
            </tableData>
          <tableData breakPoint="0.2">
                         -20           -10             0            10            20
                       -24      -0.01213     -0.007137             0      0.007137       0.01213
                     -21.5      -0.01137     -0.006687             0      0.006687       0.01137
                       -19      -0.01017     -0.005984             0      0.005984       0.01017
                     -16.5     -0.008548     -0.005028             0      0.005028      0.008548
                       -14     -0.006633     -0.003902             0      0.003902      0.006633
                     -11.5     -0.004732     -0.002784             0      0.002784      0.004732
                        -9     -0.002873      -0.00169             0       0.00169      0.002873
                      -6.5     -0.001082    -0.0006365             0     0.0006365      0.001082
                        -4     0.0006309     0.0003711             0    -0.0003711    -0.0006309
                      -1.5      0.002413       0.00142             0      -0.00142     -0.002413
                         1      0.004288      0.002522             0     -0.002522     -0.004288
                       3.5      0.006229      0.003664             0     -0.003664     -0.006229
                         6       0.00821      0.004829             0     -0.004829      -0.00821
                       8.5       0.01004      0.005908             0     -0.005908      -0.01004
                        11       0.01142      0.006719             0     -0.006719      -0.01142
            </tableData>
          <tableData breakPoint="0.3">
                         -20           -10             0            10            20
                       -24      -0.01151     -0.006773             0      0.006773       0.01151
                     -21.5      -0.01057     -0.006219             0      0.006219       0.01057
                       -19     -0.009677     -0.005692             0      0.005692      0.009677
                     -16.5     -0.008364      -0.00492             0       0.00492      0.008364
                       -14     -0.006609     -0.003888             0      0.003888      0.006609
                     -11.5     -0.004739     -0.002788             0      0.002788      0.004739
                        -9     -0.002892     -0.001701             0      0.001701      0.002892
                      -6.5     -0.001095    -0.0006443             0     0.0006443      0.001095
                        -4     0.0006397     0.0003763             0    -0.0003763    -0.0006397
                      -1.5      0.002433      0.001431             0     -0.001431     -0.002433
                         1        0.0043      0.002529             0     -0.002529       -0.0043
                       3.5      0.006215      0.003656             0     -0.003656     -0.006215
                         6      0.008125       0.00478             0      -0.00478     -0.008125
                       8.5      0.009602      0.005648             0     -0.005648     -0.009602
                        11       0.01069      0.006289             0     -0.006289      -0.01069
            </tableData>
        </table>
      </product>
    </function>
    <function name="aero/coefficient/Cndr">
      <description>[임시 placeholder, 2026-08-20] CLde/Cmde와 동일 사유(V-tail 러더베이터 데이터 미확보). 레퍼런스 standard_vtol_demo.xml(A)의 계수를 그대로 임시 적용. 정식 데이터 확보 시 교체 필요.</description>
      <product>
        <property>aero/qbar-area</property>
        <property>metrics/bw-ft</property>
        <property>fcs/rudder-pos-rad</property>
        <value>0.09</value>
      </product>
    </function>
    <function name="aero/coefficient/motor_yaw_torque">
      <description>V6212 제조사 데이터를 이용한 리프트 모터 반작용 토크. fcs/net_torque의 단위는 N*m이며, 0.737562149277을 곱해 JSBSim YAW 모멘트 축에서 사용하는 ft*lbf로 변환함. 기존 로터 회전방향 부호 패턴은 유지함.</description>
      <product>
        <property>fcs/net_torque</property>
        <value>0.737562149277</value>
      </product>
    </function>
  </axis>
</aerodynamics>
