<?xml version='1.0' encoding='UTF-8'?>
<fdm_config xmlns:xsi="http://www.w3.org/2001/XMLSchema-instance" name="standard_vtol_demo_motor_updated_ko" version="2.0" release="ALPHA" xsi:noNamespaceSchemaLocation="http://jsbsim.sourceforge.net/JSBSim.xsd">
  <fileheader>
    <author>IAMAI / Codex demo scaffold</author>
    <filecreationdate>2026-05-06</filecreationdate>
    <version>0.3</version>
    <description>PX4/JSBSim 연동을 위한 2단계 VTOL 모델. 리프트 모터 4개와 푸셔 모터 1개를 구성하고, 기체 형상·질량/CG·DATCOM 공력 데이터 및 제조사 정지추력 시험 데이터를 반영함.</description>
    <note>2단계 수정 사항. 리프트 모터는 Hobbywing V6212 180KV + VSC 22.1x7.4의 정지시험 데이터를 사용하고, 푸셔 모터는 Hobbywing V6215 210KV + VSC 22.1x7.4의 정지 인장시험 데이터를 사용함. 모든 시험 조건은 46V/12S임. 추력은 스로틀-정지추력 lookup table로 직접 모델링함. 리프트 모터 반작용 토크는 제조사 토크 데이터와 기존 CW/CCW 부호 패턴을 사용함. 제조사 데이터가 33% 스로틀부터 제공되므로 0~33% 구간은 스로틀 0에서 추력/토크 0, 33%에서 첫 시험값을 기준으로 선형보간함. 검증된 유입류/전진비 데이터가 확보될 때까지 푸셔의 전진속도 보정은 적용하지 않음. 관성모멘트, 지면 접촉점 좌표, 모터 좌표는 최종 CAD 값 반영 전까지 임시값으로 유지함.</note>
  </fileheader>
  <metrics>
    <wingarea unit="M2">0.5720</wingarea>
    <wingspan unit="M">3.000</wingspan>
    <chord unit="M">0.215</chord>
    <htailarea unit="M2">0.1640</htailarea>
    <htailarm unit="M">0.730</htailarm>
    <vtailarea unit="M2">0.0820</vtailarea>
    <vtailarm unit="M">0.730</vtailarm>
    <location name="AERORP" unit="M">
      <x>0.0</x>
      <y>0.0</y>
      <z>0.0</z>
    </location>
    <location name="EYEPOINT" unit="M">
      <x>0.15</x>
      <y>0.0</y>
      <z>-0.05</z>
    </location>
    <location name="VRP" unit="M">
      <x>0.0</x>
      <y>0.0</y>
      <z>0.0</z>
    </location>
  </metrics>
  <mass_balance>
    <ixx unit="KG*M2">10.7000</ixx>
    <iyy unit="KG*M2">8.0000</iyy>
    <izz unit="KG*M2">18.5000</izz>
    <emptywt unit="KG">20.0</emptywt>
    <location name="CG" unit="M">
      <x>0.649</x>
      <y>0.0</y>
      <z>0.0</z>
    </location>
  </mass_balance>
  <ground_reactions>
    <contact type="BOGEY" name="front_foot">
      <location unit="M">
        <x>1.249</x>
        <y>0.00</y>
        <z>-0.18</z>
      </location>
      <static_friction>0.7</static_friction>
      <dynamic_friction>0.5</dynamic_friction>
      <rolling_friction>0.05</rolling_friction>
      <spring_coeff unit="LBS/FT">600</spring_coeff>
      <damping_coeff unit="LBS/FT/SEC">20</damping_coeff>
      <max_steer unit="DEG">0.0</max_steer>
      <brake_group>NONE</brake_group>
    </contact>
    <contact type="BOGEY" name="rear_left_foot">
      <location unit="M">
        <x>0.049</x>
        <y>-2.00</y>
        <z>-0.18</z>
      </location>
      <static_friction>0.7</static_friction>
      <dynamic_friction>0.5</dynamic_friction>
      <rolling_friction>0.05</rolling_friction>
      <spring_coeff unit="LBS/FT">300</spring_coeff>
      <damping_coeff unit="LBS/FT/SEC">12</damping_coeff>
      <max_steer unit="DEG">0.0</max_steer>
      <brake_group>NONE</brake_group>
    </contact>
    <contact type="BOGEY" name="rear_right_foot">
      <location unit="M">
        <x>0.049</x>
        <y>2.00</y>
        <z>-0.18</z>
      </location>
      <static_friction>0.7</static_friction>
      <dynamic_friction>0.5</dynamic_friction>
      <rolling_friction>0.05</rolling_friction>
      <spring_coeff unit="LBS/FT">300</spring_coeff>
      <damping_coeff unit="LBS/FT/SEC">12</damping_coeff>
      <max_steer unit="DEG">0.0</max_steer>
      <brake_group>NONE</brake_group>
    </contact>
  </ground_reactions>
  <system name="fcs">
    <property value="0.0">fcs/esc-cmd-norm[0]</property>
    <property value="0.0">fcs/esc-cmd-norm[1]</property>
    <property value="0.0">fcs/esc-cmd-norm[2]</property>
    <property value="0.0">fcs/esc-cmd-norm[3]</property>
    <property value="0.0">fcs/esc-cmd-norm[4]</property>
    <channel name="LiftMotor0">
      <actuator name="fcs/etc/esc_0">
        <input>fcs/esc-cmd-norm[0]</input>
        <clipto>
          <min>0.0</min>
          <max>1.0</max>
        </clipto>
        <output>fcs/esc-out[0]</output>
      </actuator>
    </channel>
    <channel name="LiftMotor1">
      <actuator name="fcs/etc/esc_1">
        <input>fcs/esc-cmd-norm[1]</input>
        <clipto>
          <min>0.0</min>
          <max>1.0</max>
        </clipto>
        <output>fcs/esc-out[1]</output>
      </actuator>
    </channel>
    <channel name="LiftMotor2">
      <actuator name="fcs/etc/esc_2">
        <input>fcs/esc-cmd-norm[2]</input>
        <clipto>
          <min>0.0</min>
          <max>1.0</max>
        </clipto>
        <output>fcs/esc-out[2]</output>
      </actuator>
    </channel>
    <channel name="LiftMotor3">
      <actuator name="fcs/etc/esc_3">
        <input>fcs/esc-cmd-norm[3]</input>
        <clipto>
          <min>0.0</min>
          <max>1.0</max>
        </clipto>
        <output>fcs/esc-out[3]</output>
      </actuator>
    </channel>
    <channel name="PusherMotor">
      <actuator name="fcs/etc/esc_4">
        <input>fcs/esc-cmd-norm[4]</input>
        <clipto>
          <min>0.0</min>
          <max>1.0</max>
        </clipto>
        <output>fcs/esc-out[4]</output>
      </actuator>
    </channel>
    <property value="0.0">fcs/motor_torque[0]</property>
    <property value="0.0">fcs/motor_torque[1]</property>
    <property value="0.0">fcs/motor_torque[2]</property>
    <property value="0.0">fcs/motor_torque[3]</property>
    <channel name="Motor0Torque">
      <fcs_function>
        <function>
          <product>
            <table>
              <independentVar>fcs/esc-out[0]</independentVar>
              <tableData>
                0.00  0.0000
                0.33  0.5000
                0.35  0.5000
                0.37  0.6000
                0.39  0.7000
                0.42  0.8000
                0.45  0.9000
                0.48  1.0000
                0.51  1.1000
                0.54  1.2000
                0.57  1.3000
                0.60  1.4000
                0.63  1.5000
                0.66  1.6000
                0.69  1.8000
                0.72  1.9000
                0.75  2.0000
                0.78  2.2000
                0.81  2.3000
                0.84  2.5000
                0.87  2.6000
                0.90  2.7000
                1.00  2.9000
              </tableData>
            </table>
            <value>1.0</value>
          </product>
        </function>
        <output>fcs/motor_torque[0]</output>
      </fcs_function>
    </channel>
    <channel name="Motor1Torque">
      <fcs_function>
        <function>
          <product>
            <table>
              <independentVar>fcs/esc-out[1]</independentVar>
              <tableData>
                0.00  0.0000
                0.33  0.5000
                0.35  0.5000
                0.37  0.6000
                0.39  0.7000
                0.42  0.8000
                0.45  0.9000
                0.48  1.0000
                0.51  1.1000
                0.54  1.2000
                0.57  1.3000
                0.60  1.4000
                0.63  1.5000
                0.66  1.6000
                0.69  1.8000
                0.72  1.9000
                0.75  2.0000
                0.78  2.2000
                0.81  2.3000
                0.84  2.5000
                0.87  2.6000
                0.90  2.7000
                1.00  2.9000
              </tableData>
            </table>
            <value>1.0</value>
          </product>
        </function>
        <output>fcs/motor_torque[1]</output>
      </fcs_function>
    </channel>
    <channel name="Motor2Torque">
      <fcs_function>
        <function>
          <product>
            <table>
              <independentVar>fcs/esc-out[2]</independentVar>
              <tableData>
                0.00  0.0000
                0.33  0.5000
                0.35  0.5000
                0.37  0.6000
                0.39  0.7000
                0.42  0.8000
                0.45  0.9000
                0.48  1.0000
                0.51  1.1000
                0.54  1.2000
                0.57  1.3000
                0.60  1.4000
                0.63  1.5000
                0.66  1.6000
                0.69  1.8000
                0.72  1.9000
                0.75  2.0000
                0.78  2.2000
                0.81  2.3000
                0.84  2.5000
                0.87  2.6000
                0.90  2.7000
                1.00  2.9000
              </tableData>
            </table>
            <value>-1.0</value>
          </product>
        </function>
        <output>fcs/motor_torque[2]</output>
      </fcs_function>
    </channel>
    <channel name="Motor3Torque">
      <fcs_function>
        <function>
          <product>
            <table>
              <independentVar>fcs/esc-out[3]</independentVar>
              <tableData>
                0.00  0.0000
                0.33  0.5000
                0.35  0.5000
                0.37  0.6000
                0.39  0.7000
                0.42  0.8000
                0.45  0.9000
                0.48  1.0000
                0.51  1.1000
                0.54  1.2000
                0.57  1.3000
                0.60  1.4000
                0.63  1.5000
                0.66  1.6000
                0.69  1.8000
                0.72  1.9000
                0.75  2.0000
                0.78  2.2000
                0.81  2.3000
                0.84  2.5000
                0.87  2.6000
                0.90  2.7000
                1.00  2.9000
              </tableData>
            </table>
            <value>-1.0</value>
          </product>
        </function>
        <output>fcs/motor_torque[3]</output>
      </fcs_function>
    </channel>
    <channel name="NetMotorTorque">
      <fcs_function>
        <function>
          <sum>
            <property>fcs/motor_torque[0]</property>
            <property>fcs/motor_torque[1]</property>
            <property>fcs/motor_torque[2]</property>
            <property>fcs/motor_torque[3]</property>
          </sum>
        </function>
        <output>fcs/net_torque</output>
      </fcs_function>
    </channel>
  </system>
  <flight_control name="standard_vtol_demo">
    <channel name="Roll">
      <summer name="fcs/aileron-sum">
        <input>fcs/aileron-cmd-norm</input>
        <clipto>
          <min>-1</min>
          <max>1</max>
        </clipto>
      </summer>
      <aerosurface_scale name="fcs/left-aileron-control">
        <input>fcs/aileron-sum</input>
        <range>
          <min>-25</min>
          <max>25</max>
        </range>
        <gain>0.0174533</gain>
      </aerosurface_scale>
      <actuator name="fcs/left-aileron-actuator">
        <input>fcs/left-aileron-control</input>
        <clipto>
          <min>-0.4363</min>
          <max>0.4363</max>
        </clipto>
        <output>fcs/left-aileron-pos-rad</output>
      </actuator>
      <aerosurface_scale name="fcs/right-aileron-control">
        <input>fcs/aileron-sum</input>
        <range>
          <min>-25</min>
          <max>25</max>
        </range>
        <gain>0.0174533</gain>
      </aerosurface_scale>
      <actuator name="fcs/right-aileron-actuator">
        <input>fcs/right-aileron-control</input>
        <clipto>
          <min>-0.4363</min>
          <max>0.4363</max>
        </clipto>
        <output>fcs/right-aileron-pos-rad</output>
      </actuator>
      <summer name="fcs/effective-aileron-pos">
        <input>fcs/left-aileron-pos-rad</input>
        <input>fcs/right-aileron-pos-rad</input>
        <gain>0.5</gain>
      </summer>
      <aerosurface_scale name="fcs/effective-aileron-control-deg">
        <input>fcs/aileron-cmd-norm</input>
        <range>
          <min>-20</min>
          <max>20</max>
        </range>
        <output>fcs/effective-aileron-pos-deg</output>
      </aerosurface_scale>
    </channel>
    <channel name="Pitch">
      <summer name="fcs/elevator-sum">
        <input>fcs/elevator-cmd-norm</input>
        <clipto>
          <min>-1</min>
          <max>1</max>
        </clipto>
      </summer>
      <aerosurface_scale name="fcs/elevator-control">
        <input>fcs/elevator-sum</input>
        <range>
          <min>-25</min>
          <max>25</max>
        </range>
        <gain>0.0174533</gain>
      </aerosurface_scale>
      <actuator name="fcs/elevator-actuator">
        <input>fcs/elevator-control</input>
        <clipto>
          <min>-0.4363</min>
          <max>0.4363</max>
        </clipto>
        <output>fcs/elevator-pos-rad</output>
      </actuator>
      <fcs_function name="fcs/mag-elevator-pos-rad">
        <function>
          <abs>
            <property>fcs/elevator-pos-rad</property>
          </abs>
        </function>
      </fcs_function>
    </channel>
    <channel name="Yaw">
      <summer name="fcs/rudder-sum">
        <input>fcs/rudder-cmd-norm</input>
        <clipto>
          <min>-1</min>
          <max>1</max>
        </clipto>
      </summer>
      <aerosurface_scale name="fcs/rudder-control">
        <input>fcs/rudder-sum</input>
        <range>
          <min>-25</min>
          <max>25</max>
        </range>
        <gain>0.0174533</gain>
      </aerosurface_scale>
      <actuator name="fcs/rudder-actuator">
        <input>fcs/rudder-control</input>
        <clipto>
          <min>-0.4363</min>
          <max>0.4363</max>
        </clipto>
        <output>fcs/rudder-pos-rad</output>
      </actuator>
    </channel>
  </flight_control>
  <external_reactions>
    <property value="0.0">fcs/esc-out[0]</property>
    <property value="0.0">fcs/esc-out[1]</property>
    <property value="0.0">fcs/esc-out[2]</property>
    <property value="0.0">fcs/esc-out[3]</property>
    <property value="0.0">fcs/esc-out[4]</property>
    <force name="MOTOR_0_LIFT_FR" frame="BODY">
      <function>
        <table>
          <independentVar>fcs/esc-out[0]</independentVar>
          <tableData>
              0.00  0.000000
              0.33  4.067529
              0.35  4.605457
              0.37  5.145589
              0.39  5.685722
              0.42  6.501432
              0.45  7.323756
              0.48  8.159308
              0.51  9.014702
              0.54  9.896551
              0.57  10.813674
              0.60  11.768276
              0.63  12.766970
              0.66  13.811961
              0.69  14.901044
              0.72  16.032016
              0.75  17.193852
              0.78  18.371120
              0.81  19.546184
              0.84  20.690383
              0.87  21.770648
              0.90  22.747296
              1.00  24.502176
            </tableData>
        </table>
      </function>
      <location unit="M">
        <x>-0.105</x>
        <y>1.163</y>
        <z>0.05</z>
      </location>
      <direction>
        <x>0.0</x>
        <y>0.0</y>
        <z>-1.0</z>
      </direction>
    </force>
    <force name="MOTOR_1_LIFT_RL" frame="BODY">
      <function>
        <table>
          <independentVar>fcs/esc-out[1]</independentVar>
          <tableData>
              0.00  0.000000
              0.33  4.067529
              0.35  4.605457
              0.37  5.145589
              0.39  5.685722
              0.42  6.501432
              0.45  7.323756
              0.48  8.159308
              0.51  9.014702
              0.54  9.896551
              0.57  10.813674
              0.60  11.768276
              0.63  12.766970
              0.66  13.811961
              0.69  14.901044
              0.72  16.032016
              0.75  17.193852
              0.78  18.371120
              0.81  19.546184
              0.84  20.690383
              0.87  21.770648
              0.90  22.747296
              1.00  24.502176
            </tableData>
        </table>
      </function>
      <location unit="M">
        <x>1.404</x>
        <y>-1.163</y>
        <z>0.05</z>
      </location>
      <direction>
        <x>0.0</x>
        <y>0.0</y>
        <z>-1.0</z>
      </direction>
    </force>
    <force name="MOTOR_2_LIFT_FL" frame="BODY">
      <function>
        <table>
          <independentVar>fcs/esc-out[2]</independentVar>
          <tableData>
              0.00  0.000000
              0.33  4.067529
              0.35  4.605457
              0.37  5.145589
              0.39  5.685722
              0.42  6.501432
              0.45  7.323756
              0.48  8.159308
              0.51  9.014702
              0.54  9.896551
              0.57  10.813674
              0.60  11.768276
              0.63  12.766970
              0.66  13.811961
              0.69  14.901044
              0.72  16.032016
              0.75  17.193852
              0.78  18.371120
              0.81  19.546184
              0.84  20.690383
              0.87  21.770648
              0.90  22.747296
              1.00  24.502176
            </tableData>
        </table>
      </function>
      <location unit="M">
        <x>-0.105</x>
        <y>-1.163</y>
        <z>0.05</z>
      </location>
      <direction>
        <x>0.0</x>
        <y>0.0</y>
        <z>-1.0</z>
      </direction>
    </force>
    <force name="MOTOR_3_LIFT_RR" frame="BODY">
      <function>
        <table>
          <independentVar>fcs/esc-out[3]</independentVar>
          <tableData>
              0.00  0.000000
              0.33  4.067529
              0.35  4.605457
              0.37  5.145589
              0.39  5.685722
              0.42  6.501432
              0.45  7.323756
              0.48  8.159308
              0.51  9.014702
              0.54  9.896551
              0.57  10.813674
              0.60  11.768276
              0.63  12.766970
              0.66  13.811961
              0.69  14.901044
              0.72  16.032016
              0.75  17.193852
              0.78  18.371120
              0.81  19.546184
              0.84  20.690383
              0.87  21.770648
              0.90  22.747296
              1.00  24.502176
            </tableData>
        </table>
      </function>
      <location unit="M">
        <x>1.404</x>
        <y>1.163</y>
        <z>0.05</z>
      </location>
      <direction>
        <x>0.0</x>
        <y>0.0</y>
        <z>-1.0</z>
      </direction>
    </force>
    <force name="PUSHER_THRUST" frame="BODY">
      <function>
        <description>Hobbywing V6215 210KV + VSC 22.1x7.4의 46V/12S 정지 인장시험 추력 데이터. 스로틀만을 입력으로 사용하는 경험적 모델이며, 검증된 유입류/전진비 데이터가 확보될 때까지 전진속도 보정은 적용하지 않음.</description>
        <table>
          <independentVar>fcs/esc-out[4]</independentVar>
          <tableData>
            0.00  0.000000
              0.33  4.792850
              0.35  5.346210
              0.37  5.963504
              0.39  6.629300
              0.42  7.680905
              0.45  8.761170
              0.48  9.843640
              0.51  10.912882
              0.54  11.968896
              0.57  13.011683
              0.60  14.052265
              0.63  15.108279
              0.66  16.192953
              0.69  17.323925
              0.72  18.514421
              0.75  19.773260
              0.78  21.104852
              0.81  22.504788
              0.84  23.955429
              0.87  25.430322
              0.90  26.889782
              1.00  30.597957
            </tableData>
        </table>
      </function>
      <location unit="M">
        <x>2.249</x>
        <y>0.0</y>
        <z>0.0</z>
      </location>
      <direction>
        <x>1.0</x>
        <y>0.0</y>
        <z>0.0</z>
      </direction>
    </force>
  </external_reactions>
  <aerodynamics>
    <alphalimits unit="DEG">
      <min>-24</min>
      <max>11</max>
    </alphalimits>
    <axis name="LIFT">
      <function name="aero/coefficient/CL_base">
        <description>DATCOM clean case 기반 양력계수</description>
        <product>
          <property>aero/qbar-area</property>
          <table>
            <independentVar lookup="row">aero/alpha-deg</independentVar>
            <independentVar lookup="column">velocities/mach</independentVar>
            <tableData>
            0.1 0.2 0.3
            -24 -1.913 -1.916 -1.805
            -21.5 -1.788 -1.793 -1.67
            -19 -1.601 -1.607 -1.53
            -16.5 -1.354 -1.361 -1.33
            -14 -1.073 -1.079 -1.072
            -11.5 -0.794 -0.799 -0.798
            -9 -0.521 -0.525 -0.526
            -6.5 -0.258 -0.26 -0.261
            -4 -0.005 -0.005 -0.004
            -1.5 0.255 0.256 0.258
            1 0.523 0.527 0.527
            3.5 0.799 0.804 0.801
            6 1.081 1.087 1.076
            8.5 1.348 1.354 1.301
            11 1.553 1.559 1.472
          </tableData>
          </table>
        </product>
      </function>
      <function name="aero/coefficient/CLq">
        <description>Pitch rate에 의한 양력 성분</description>
        <product>
          <property>aero/qbar-area</property>
          <product>
            <value>57.295779513082</value>
            <property>velocities/q-aero-rad_sec</property>
            <property>aero/ci2vel</property>
          </product>
          <table>
            <independentVar lookup="row">aero/alpha-deg</independentVar>
            <independentVar lookup="column">velocities/mach</independentVar>
            <tableData>
            0.1 0.2 0.3
            -24 0.03341 0.03807 0.09216
            -21.5 0.03341 0.03807 0.09216
            -19 0.03341 0.03807 0.09216
            -16.5 0.03341 0.03807 0.09216
            -14 0.03341 0.03807 0.09216
            -11.5 0.03341 0.03807 0.09216
            -9 0.03341 0.03807 0.09216
            -6.5 0.03341 0.03807 0.09216
            -4 0.03341 0.03807 0.09216
            -1.5 0.03341 0.03807 0.09216
            1 0.03341 0.03807 0.09216
            3.5 0.03341 0.03807 0.09216
            6 0.03341 0.03807 0.09216
            8.5 0.03341 0.03807 0.09216
            11 0.03341 0.03807 0.09216
          </tableData>
          </table>
        </product>
      </function>
      <function name="aero/coefficient/CLadot">
        <description>받음각 변화율(alpha-dot)에 의한 양력 성분</description>
        <product>
          <property>aero/qbar-area</property>
          <product>
            <value>57.295779513082</value>
            <property>aero/alphadot-rad_sec</property>
            <property>aero/ci2vel</property>
          </product>
          <table>
            <independentVar lookup="row">aero/alpha-deg</independentVar>
            <independentVar lookup="column">velocities/mach</independentVar>
            <tableData>
            0.1 0.2 0.3
            -24 -0.0004351 0.0002935 0.01056
            -21.5 -0.0005032 0.00034 0.01059
            -19 -0.0006471 0.0004372 0.01228
            -16.5 -0.0007802 0.0005288 0.01569
            -14 -0.0008457 0.0005753 0.01802
            -11.5 -0.0008557 0.0005823 0.01869
            -9 -0.0008554 0.0005824 0.0188
            -6.5 -0.0008499 0.0005789 0.01879
            -4 -0.0008633 0.000588 0.0191
            -1.5 -0.0009 0.0006128 0.01981
            1 -0.0009318 0.0006342 0.02038
            3.5 -0.0009269 0.0006304 0.01997
            6 -0.0008798 0.0005968 0.01799
            8.5 -0.0007828 0.0005299 0.01508
            11 -0.0006031 0.0004112 0.0105
          </tableData>
          </table>
        </product>
      </function>
    </axis>
    <axis name="DRAG">
      <function name="aero/coefficient/CD_base">
        <description>DATCOM clean case 기반 항력계수</description>
        <product>
          <property>aero/qbar-area</property>
          <table>
            <independentVar lookup="row">aero/alpha-deg</independentVar>
            <independentVar lookup="column">velocities/mach</independentVar>
            <tableData>
            0.1 0.2 0.3
            -24 0.197 0.185 0.166
            -21.5 0.174 0.163 0.145
            -19 0.144 0.135 0.124
            -16.5 0.112 0.105 0.099
            -14 0.083 0.077 0.073
            -11.5 0.06 0.055 0.052
            -9 0.044 0.039 0.037
            -6.5 0.033 0.029 0.027
            -4 0.029 0.025 0.023
            -1.5 0.03 0.026 0.025
            1 0.037 0.033 0.031
            3.5 0.05 0.046 0.044
            6 0.069 0.065 0.063
            8.5 0.092 0.089 0.083
            11 0.116 0.112 0.102
          </tableData>
          </table>
        </product>
      </function>
    </axis>
    <axis name="SIDE">
      <function name="aero/coefficient/CYp">
        <description>Roll rate에 의한 측력 성분</description>
        <product>
          <property>aero/qbar-area</property>
          <product>
            <value>57.295779513082</value>
            <property>velocities/p-aero-rad_sec</property>
            <property>aero/bi2vel</property>
          </product>
          <table>
            <independentVar lookup="row">aero/alpha-deg</independentVar>
            <independentVar lookup="column">velocities/mach</independentVar>
            <tableData>
            0.1 0.2 0.3
            -24 -0.001606 -0.001634 -0.001837
            -21.5 -0.001456 -0.001479 -0.001715
            -19 -0.001393 -0.001412 -0.001575
            -16.5 -0.001417 -0.001431 -0.001519
            -14 -0.001492 -0.001505 -0.001553
            -11.5 -0.001555 -0.001568 -0.001604
            -9 -0.001603 -0.001615 -0.001642
            -6.5 -0.00163 -0.001642 -0.001665
            -4 -0.001635 -0.001647 -0.001669
            -1.5 -0.001655 -0.001667 -0.001685
            1 -0.001699 -0.001711 -0.00172
            3.5 -0.001771 -0.001782 -0.001776
            6 -0.001897 -0.001906 -0.001878
            8.5 -0.00352 -0.003696 -0.001162
            11 -0.00156 -0.001568 -0.001483
          </tableData>
          </table>
        </product>
      </function>
    </axis>
    <axis name="ROLL">
      <function name="aero/coefficient/Cl_beta">
        <description>Sideslip에 의한 롤 모멘트: DATCOM CLB_per_deg에 beta_deg를 곱하여 계산</description>
        <product>
          <property>aero/qbar-area</property>
          <property>metrics/bw-ft</property>
          <property>aero/beta-deg</property>
          <table>
            <independentVar lookup="row">aero/alpha-deg</independentVar>
            <independentVar lookup="column">velocities/mach</independentVar>
            <tableData>
            0.1 0.2 0.3
            -24 -0.002811 -0.002828 -0.00288
            -21.5 -0.002667 -0.002683 -0.002744
            -19 -0.002531 -0.002546 -0.002596
            -16.5 -0.002406 -0.00242 -0.002458
            -14 -0.002288 -0.002301 -0.002332
            -11.5 -0.00217 -0.002183 -0.00221
            -9 -0.002048 -0.00206 -0.002085
            -6.5 -0.00192 -0.001932 -0.001955
            -4 -0.001787 -0.001799 -0.001821
            -1.5 -0.001653 -0.001664 -0.001685
            1 -0.001518 -0.001529 -0.001548
            3.5 -0.001383 -0.001394 -0.001411
            6 -0.001249 -0.001259 -0.001273
            8.5 -0.001112 -0.001121 -0.001124
            11 -0.0009633 -0.0009713 -0.000966
          </tableData>
          </table>
        </product>
      </function>
      <function name="aero/coefficient/Clp">
        <description>롤 댐핑</description>
        <product>
          <property>aero/qbar-area</property>
          <property>metrics/bw-ft</property>
          <product>
            <value>57.295779513082</value>
            <property>velocities/p-aero-rad_sec</property>
            <property>aero/bi2vel</property>
          </product>
          <table>
            <independentVar lookup="row">aero/alpha-deg</independentVar>
            <independentVar lookup="column">velocities/mach</independentVar>
            <tableData>
            0.1 0.2 0.3
            -24 -0.000113 -7.693e-05 0.002699
            -21.5 0.0005875 0.0006763 0.002674
            -19 0.0013 0.001433 0.003488
            -16.5 0.001906 0.002086 0.005204
            -14 0.002193 0.002403 0.006354
            -11.5 0.002251 0.00246 0.006622
            -9 0.002259 0.002465 0.006569
            -6.5 0.002225 0.002425 0.006429
            -4 0.002269 0.00247 0.006473
            -1.5 0.002414 0.002621 0.006752
            1 0.002535 0.002749 0.006989
            3.5 0.002597 0.002815 0.007059
            6 0.002501 0.0027 0.006207
            8.5 0.002042 0.0022 0.004632
            11 0.001391 0.001505 0.002459
          </tableData>
          </table>
        </product>
      </function>
      <function name="aero/coefficient/Clr">
        <description>Yaw rate에 의한 롤 모멘트</description>
        <product>
          <property>aero/qbar-area</property>
          <property>metrics/bw-ft</property>
          <product>
            <value>57.295779513082</value>
            <property>velocities/r-aero-rad_sec</property>
            <property>aero/bi2vel</property>
          </product>
          <table>
            <independentVar lookup="row">aero/alpha-deg</independentVar>
            <independentVar lookup="column">velocities/mach</independentVar>
            <tableData>
            0.1 0.2 0.3
            -24 -0.005408 -0.005504 -0.005288
            -21.5 -0.005025 -0.005121 -0.004796
            -19 -0.004419 -0.00451 -0.004341
            -16.5 -0.003584 -0.00367 -0.003659
            -14 -0.002609 -0.002676 -0.002734
            -11.5 -0.001652 -0.001699 -0.001752
            -9 -0.0007263 -0.000754 -0.0007918
            -6.5 0.0001535 0.0001453 0.0001321
            -4 0.0009832 0.0009945 0.001014
            -1.5 0.001845 0.001876 0.001923
            1 0.002754 0.002804 0.002869
            3.5 0.003695 0.003766 0.003838
            6 0.004656 0.004746 0.004801
            8.5 0.005543 0.005641 0.005514
            11 0.006176 0.006281 0.006006
          </tableData>
          </table>
        </product>
      </function>
      <function name="aero/coefficient/Cl_da">
        <description>에일러론 편향에 따른 롤 모멘트 증분</description>
        <product>
          <property>aero/qbar-area</property>
          <property>metrics/bw-ft</property>
          <table>
            <independentVar lookup="row">aero/alpha-deg</independentVar>
            <independentVar lookup="column">fcs/effective-aileron-pos-deg</independentVar>
            <independentVar lookup="table">velocities/mach</independentVar>
            <tableData breakPoint="0.1">
                         -20           -10             0            10            20
                       -24     -0.062287     -0.036639             0      0.036639      0.062287
                     -21.5     -0.062287     -0.036639             0      0.036639      0.062287
                       -19     -0.062287     -0.036639             0      0.036639      0.062287
                     -16.5     -0.062287     -0.036639             0      0.036639      0.062287
                       -14     -0.062287     -0.036639             0      0.036639      0.062287
                     -11.5     -0.062287     -0.036639             0      0.036639      0.062287
                        -9     -0.062287     -0.036639             0      0.036639      0.062287
                      -6.5     -0.062287     -0.036639             0      0.036639      0.062287
                        -4     -0.062287     -0.036639             0      0.036639      0.062287
                      -1.5     -0.062287     -0.036639             0      0.036639      0.062287
                         1     -0.062287     -0.036639             0      0.036639      0.062287
                       3.5     -0.062287     -0.036639             0      0.036639      0.062287
                         6     -0.062287     -0.036639             0      0.036639      0.062287
                       8.5     -0.062287     -0.036639             0      0.036639      0.062287
                        11     -0.062287     -0.036639             0      0.036639      0.062287
            </tableData>
            <tableData breakPoint="0.2">
                         -20           -10             0            10            20
                       -24     -0.062456     -0.036739             0      0.036739      0.062456
                     -21.5     -0.062456     -0.036739             0      0.036739      0.062456
                       -19     -0.062456     -0.036739             0      0.036739      0.062456
                     -16.5     -0.062456     -0.036739             0      0.036739      0.062456
                       -14     -0.062456     -0.036739             0      0.036739      0.062456
                     -11.5     -0.062456     -0.036739             0      0.036739      0.062456
                        -9     -0.062456     -0.036739             0      0.036739      0.062456
                      -6.5     -0.062456     -0.036739             0      0.036739      0.062456
                        -4     -0.062456     -0.036739             0      0.036739      0.062456
                      -1.5     -0.062456     -0.036739             0      0.036739      0.062456
                         1     -0.062456     -0.036739             0      0.036739      0.062456
                       3.5     -0.062456     -0.036739             0      0.036739      0.062456
                         6     -0.062456     -0.036739             0      0.036739      0.062456
                       8.5     -0.062456     -0.036739             0      0.036739      0.062456
                        11     -0.062456     -0.036739             0      0.036739      0.062456
            </tableData>
            <tableData breakPoint="0.3">
                         -20           -10             0            10            20
                       -24     -0.062545     -0.036791             0      0.036791      0.062545
                     -21.5     -0.062545     -0.036791             0      0.036791      0.062545
                       -19     -0.062545     -0.036791             0      0.036791      0.062545
                     -16.5     -0.062545     -0.036791             0      0.036791      0.062545
                       -14     -0.062545     -0.036791             0      0.036791      0.062545
                     -11.5     -0.062545     -0.036791             0      0.036791      0.062545
                        -9     -0.062545     -0.036791             0      0.036791      0.062545
                      -6.5     -0.062545     -0.036791             0      0.036791      0.062545
                        -4     -0.062545     -0.036791             0      0.036791      0.062545
                      -1.5     -0.062545     -0.036791             0      0.036791      0.062545
                         1     -0.062545     -0.036791             0      0.036791      0.062545
                       3.5     -0.062545     -0.036791             0      0.036791      0.062545
                         6     -0.062545     -0.036791             0      0.036791      0.062545
                       8.5     -0.062545     -0.036791             0      0.036791      0.062545
                        11     -0.062545     -0.036791             0      0.036791      0.062545
            </tableData>
          </table>
        </product>
      </function>
    </axis>
    <axis name="PITCH">
      <function name="aero/coefficient/Cm_base">
        <description>DATCOM clean case 기반 피칭 모멘트 계수</description>
        <product>
          <property>aero/qbar-area</property>
          <property>metrics/cbarw-ft</property>
          <table>
            <independentVar lookup="row">aero/alpha-deg</independentVar>
            <independentVar lookup="column">velocities/mach</independentVar>
            <tableData>
            0.1 0.2 0.3
            -24 1.2053 1.1937 1.0759
            -21.5 1.1173 1.1094 1.0253
            -19 0.9926 0.9895 0.9397
            -16.5 0.8531 0.8522 0.8268
            -14 0.7177 0.7186 0.7084
            -11.5 0.5911 0.5932 0.5911
            -9 0.4738 0.4761 0.4754
            -6.5 0.3638 0.3661 0.3665
            -4 0.2617 0.2638 0.2649
            -1.5 0.1726 0.1743 0.1751
            1 0.0946 0.0958 0.0955
            3.5 0.0279 0.0286 0.0259
            6 -0.0403 -0.0402 -0.0466
            8.5 -0.1111 -0.1128 -0.1298
            11 -0.1673 -0.171 -0.1973
          </tableData>
          </table>
        </product>
      </function>
      <function name="aero/coefficient/Cmq">
        <description>피치 댐핑</description>
        <product>
          <property>aero/qbar-area</property>
          <property>metrics/cbarw-ft</property>
          <product>
            <value>57.295779513082</value>
            <property>velocities/q-aero-rad_sec</property>
            <property>aero/ci2vel</property>
          </product>
          <table>
            <independentVar lookup="row">aero/alpha-deg</independentVar>
            <independentVar lookup="column">velocities/mach</independentVar>
            <tableData>
            0.1 0.2 0.3
            -24 -0.03461 -0.04837 -0.2231
            -21.5 -0.03461 -0.04837 -0.2231
            -19 -0.03461 -0.04837 -0.2231
            -16.5 -0.03461 -0.04837 -0.2231
            -14 -0.03461 -0.04837 -0.2231
            -11.5 -0.03461 -0.04837 -0.2231
            -9 -0.03461 -0.04837 -0.2231
            -6.5 -0.03461 -0.04837 -0.2231
            -4 -0.03461 -0.04837 -0.2231
            -1.5 -0.03461 -0.04837 -0.2231
            1 -0.03461 -0.04837 -0.2231
            3.5 -0.03461 -0.04837 -0.2231
            6 -0.03461 -0.04837 -0.2231
            8.5 -0.03461 -0.04837 -0.2231
            11 -0.03461 -0.04837 -0.2231
          </tableData>
          </table>
        </product>
      </function>
      <function name="aero/coefficient/Cmadot">
        <description>받음각 변화율(alpha-dot)에 의한 피치 모멘트</description>
        <product>
          <property>aero/qbar-area</property>
          <property>metrics/cbarw-ft</property>
          <product>
            <value>57.295779513082</value>
            <property>aero/alphadot-rad_sec</property>
            <property>aero/ci2vel</property>
          </product>
          <table>
            <independentVar lookup="row">aero/alpha-deg</independentVar>
            <independentVar lookup="column">velocities/mach</independentVar>
            <tableData>
            0.1 0.2 0.3
            -24 0.001423 -0.0009604 -0.03456
            -21.5 0.001646 -0.001113 -0.03464
            -19 0.002117 -0.001431 -0.04017
            -16.5 0.002553 -0.00173 -0.05133
            -14 0.002767 -0.001882 -0.05897
            -11.5 0.0028 -0.001905 -0.06117
            -9 0.002799 -0.001905 -0.06152
            -6.5 0.002781 -0.001894 -0.06149
            -4 0.002824 -0.001924 -0.06249
            -1.5 0.002945 -0.002005 -0.06483
            1 0.003048 -0.002075 -0.06669
            3.5 0.003032 -0.002063 -0.06534
            6 0.002878 -0.001953 -0.05885
            8.5 0.002561 -0.001734 -0.04935
            11 0.001973 -0.001345 -0.03435
          </tableData>
          </table>
        </product>
      </function>
    </axis>
    <axis name="YAW">
      <function name="aero/coefficient/Cn_beta">
        <description>Sideslip에 의한 요 모멘트: DATCOM CNB_per_deg에 beta_deg를 곱하여 계산</description>
        <product>
          <property>aero/qbar-area</property>
          <property>metrics/bw-ft</property>
          <property>aero/beta-deg</property>
          <table>
            <independentVar lookup="row">aero/alpha-deg</independentVar>
            <independentVar lookup="column">velocities/mach</independentVar>
            <tableData>
            0.1 0.2 0.3
            -24 0.005088 0.005174 0.005246
            -21.5 0.005088 0.005174 0.005246
            -19 0.005088 0.005174 0.005246
            -16.5 0.005088 0.005174 0.005246
            -14 0.005088 0.005174 0.005246
            -11.5 0.005088 0.005174 0.005246
            -9 0.005088 0.005174 0.005246
            -6.5 0.005088 0.005174 0.005246
            -4 0.005088 0.005174 0.005246
            -1.5 0.005088 0.005174 0.005246
            1 0.005088 0.005174 0.005246
            3.5 0.005088 0.005174 0.005246
            6 0.005088 0.005174 0.005246
            8.5 0.005088 0.005174 0.005246
            11 0.005088 0.005174 0.005246
          </tableData>
          </table>
        </product>
      </function>
      <function name="aero/coefficient/Cnp">
        <description>Roll rate에 의한 요 모멘트</description>
        <product>
          <property>aero/qbar-area</property>
          <property>metrics/bw-ft</property>
          <product>
            <value>57.295779513082</value>
            <property>velocities/p-aero-rad_sec</property>
            <property>aero/bi2vel</property>
          </product>
          <table>
            <independentVar lookup="row">aero/alpha-deg</independentVar>
            <independentVar lookup="column">velocities/mach</independentVar>
            <tableData>
            0.1 0.2 0.3
            -24 0.004062 0.004062 0.003896
            -21.5 0.0038 0.003802 0.003589
            -19 0.003417 0.003422 0.003289
            -16.5 0.002912 0.002921 0.002878
            -14 0.002326 0.002335 0.002338
            -11.5 0.001735 0.001742 0.001753
            -9 0.001146 0.001151 0.001164
            -6.5 0.0005682 0.000571 0.0005789
            -4 2.487e-06 2.714e-06 1.519e-06
            -1.5 -0.0005917 -0.0005938 -0.0006024
            1 -0.001225 -0.001229 -0.001241
            3.5 -0.0019 -0.001906 -0.001919
            6 -0.00265 -0.002656 -0.002674
            8.5 -0.005413 -0.005674 -0.002071
            11 -0.003387 -0.003394 -0.0033
          </tableData>
          </table>
        </product>
      </function>
      <function name="aero/coefficient/Cnr">
        <description>요 댐핑</description>
        <product>
          <property>aero/qbar-area</property>
          <property>metrics/bw-ft</property>
          <product>
            <value>57.295779513082</value>
            <property>velocities/r-aero-rad_sec</property>
            <property>aero/bi2vel</property>
          </product>
          <table>
            <independentVar lookup="row">aero/alpha-deg</independentVar>
            <independentVar lookup="column">velocities/mach</independentVar>
            <tableData>
            0.1 0.2 0.3
            -24 -0.002474 -0.002477 -0.002439
            -21.5 -0.002535 -0.002539 -0.002494
            -19 -0.002567 -0.002572 -0.002553
            -16.5 -0.002578 -0.002584 -0.002589
            -14 -0.002589 -0.002594 -0.00261
            -11.5 -0.002617 -0.002622 -0.00264
            -9 -0.002662 -0.002667 -0.002686
            -6.5 -0.002721 -0.002726 -0.002746
            -4 -0.002792 -0.002797 -0.002817
            -1.5 -0.002873 -0.002879 -0.002899
            1 -0.002967 -0.002973 -0.002994
            3.5 -0.003076 -0.003083 -0.003103
            6 -0.003201 -0.003209 -0.003225
            8.5 -0.003331 -0.00334 -0.003332
            11 -0.003438 -0.003447 -0.003414
          </tableData>
          </table>
        </product>
      </function>
      <function name="aero/coefficient/Cn_da">
        <description>에일러론 편향에 따른 요 모멘트 증분</description>
        <product>
          <property>aero/qbar-area</property>
          <property>metrics/bw-ft</property>
          <table>
            <independentVar lookup="row">aero/alpha-deg</independentVar>
            <independentVar lookup="column">fcs/effective-aileron-pos-deg</independentVar>
            <independentVar lookup="table">velocities/mach</independentVar>
            <tableData breakPoint="0.1">
                         -20           -10             0            10            20
                       -24      -0.01207     -0.007102             0      0.007102       0.01207
                     -21.5       -0.0113     -0.006647             0      0.006647        0.0113
                       -19       -0.0101     -0.005943             0      0.005943        0.0101
                     -16.5     -0.008473     -0.004984             0      0.004984      0.008473
                       -14     -0.006572     -0.003866             0      0.003866      0.006572
                     -11.5     -0.004686     -0.002757             0      0.002757      0.004686
                        -9     -0.002844     -0.001673             0      0.001673      0.002844
                      -6.5     -0.001071    -0.0006297             0     0.0006297      0.001071
                        -4     0.0006242     0.0003672             0    -0.0003672    -0.0006242
                      -1.5      0.002389      0.001405             0     -0.001405     -0.002389
                         1      0.004246      0.002497             0     -0.002497     -0.004246
                       3.5       0.00617       0.00363             0      -0.00363      -0.00617
                         6      0.008136      0.004786             0     -0.004786     -0.008136
                       8.5      0.009973      0.005866             0     -0.005866     -0.009973
                        11       0.01135      0.006677             0     -0.006677      -0.01135
            </tableData>
            <tableData breakPoint="0.2">
                         -20           -10             0            10            20
                       -24      -0.01213     -0.007137             0      0.007137       0.01213
                     -21.5      -0.01137     -0.006687             0      0.006687       0.01137
                       -19      -0.01017     -0.005984             0      0.005984       0.01017
                     -16.5     -0.008548     -0.005028             0      0.005028      0.008548
                       -14     -0.006633     -0.003902             0      0.003902      0.006633
                     -11.5     -0.004732     -0.002784             0      0.002784      0.004732
                        -9     -0.002873      -0.00169             0       0.00169      0.002873
                      -6.5     -0.001082    -0.0006365             0     0.0006365      0.001082
                        -4     0.0006309     0.0003711             0    -0.0003711    -0.0006309
                      -1.5      0.002413       0.00142             0      -0.00142     -0.002413
                         1      0.004288      0.002522             0     -0.002522     -0.004288
                       3.5      0.006229      0.003664             0     -0.003664     -0.006229
                         6       0.00821      0.004829             0     -0.004829      -0.00821
                       8.5       0.01004      0.005908             0     -0.005908      -0.01004
                        11       0.01142      0.006719             0     -0.006719      -0.01142
            </tableData>
            <tableData breakPoint="0.3">
                         -20           -10             0            10            20
                       -24      -0.01151     -0.006773             0      0.006773       0.01151
                     -21.5      -0.01057     -0.006219             0      0.006219       0.01057
                       -19     -0.009677     -0.005692             0      0.005692      0.009677
                     -16.5     -0.008364      -0.00492             0       0.00492      0.008364
                       -14     -0.006609     -0.003888             0      0.003888      0.006609
                     -11.5     -0.004739     -0.002788             0      0.002788      0.004739
                        -9     -0.002892     -0.001701             0      0.001701      0.002892
                      -6.5     -0.001095    -0.0006443             0     0.0006443      0.001095
                        -4     0.0006397     0.0003763             0    -0.0003763    -0.0006397
                      -1.5      0.002433      0.001431             0     -0.001431     -0.002433
                         1        0.0043      0.002529             0     -0.002529       -0.0043
                       3.5      0.006215      0.003656             0     -0.003656     -0.006215
                         6      0.008125       0.00478             0      -0.00478     -0.008125
                       8.5      0.009602      0.005648             0     -0.005648     -0.009602
                        11       0.01069      0.006289             0     -0.006289      -0.01069
            </tableData>
          </table>
        </product>
      </function>
      <function name="aero/coefficient/motor_yaw_torque">
        <description>V6212 제조사 데이터를 이용한 리프트 모터 반작용 토크. fcs/net_torque의 단위는 N*m이며, 0.737562149277을 곱해 JSBSim YAW 모멘트 축에서 사용하는 ft*lbf로 변환함. 기존 로터 회전방향 부호 패턴은 유지함.</description>
        <product>
          <property>fcs/net_torque</property>
          <value>0.737562149277</value>
        </product>
      </function>
    </axis>
  </aerodynamics>
</fdm_config>
