<?xml version="1.0"?>
<propeller name="Falcon C2E 20x10 cruise prop" version="1.1">
  <documentation>AD3000 실기 cruise prop 의도 규격은 Falcon C2E 20x10이다. 제공 페이지에서 20x10 직접 thrust/power sheet를 확인하지 못해 현재 AD3000 Propulsion.xml에서는 이 파일을 참조하지 않는다. 실제 20x10 벤치 데이터 확보 시 이 파일을 재보정해 사용할 수 있다.</documentation>
  <ixx unit="KG*M2">0.0020</ixx>
  <diameter unit="IN">20.0</diameter>
  <numblades>2</numblades>
  <constspeed>0</constspeed>
  <table name="C_THRUST" type="internal">
    <tableData>
      0.00  0.06686
      0.10  0.06620
      0.20  0.06352
      0.30  0.05884
      0.40  0.05215
      0.50  0.04279
      0.60  0.03143
      0.70  0.01872
      0.80  0.00669
      0.90  0.00000
      1.00  -0.00267
    </tableData>
  </table>

  <table name="C_POWER" type="internal">
    <tableData>
      0.00  0.02010
      0.10  0.01990
      0.20  0.01930
      0.30  0.01830
      0.40  0.01689
      0.50  0.01488
      0.60  0.01246
      0.70  0.00965
      0.80  0.00643
      0.90  0.00322
      1.00  0.00080
    </tableData>
  </table>
</propeller>
