<?xml version="1.0"?>
<propeller name="Hobbywing VSC 22.1x7.4 lift prop" version="1.1">
  <documentation>DB 정리.xlsx의 기체 Spec 시트에 정리된 Hobbywing V6212 180KV와 VSC 22.1x7.4 46V 공식 pull test 표 전체 33-100% throttle 행을 기준으로 한다. 전체 22개 행 평균으로 Ct0=0.07460, Cp0=0.02795를 환산했다. 주의: 기체 Spec 시트의 pull test 데이터는 정지 시험(static test)이므로 전진속도 V=0, 전진비 J=0 조건의 Ct/Cp만 직접 산출할 수 있다. 현재 XML의 J>0 C_THRUST/C_POWER 값은 전진비별 실측 데이터가 아니라 J=0 Ct/Cp에 일반적인 임시 advance-ratio 감소 shape를 곱한 초기 가정이다. 정확한 전진비 table을 만들려면 airspeed, RPM, thrust, power가 함께 있는 prop performance map이 필요하다.</documentation>
  <ixx unit="KG*M2">0.0030</ixx>
  <diameter unit="IN">22.1</diameter>
  <numblades>2</numblades>
  <constspeed>0</constspeed>
  <table name="C_THRUST" type="internal">
    <tableData>
      0.00  0.07460
      0.10  0.07385
      0.20  0.07087
      0.30  0.06565
      0.40  0.05819
      0.50  0.04774
      0.60  0.03506
      0.70  0.02089
      0.80  0.00746
      0.90  0.00000
      1.00  -0.00298
    </tableData>
  </table>

  <table name="C_POWER" type="internal">
    <tableData>
      0.00  0.02795
      0.10  0.02767
      0.20  0.02683
      0.30  0.02544
      0.40  0.02348
      0.50  0.02068
      0.60  0.01733
      0.70  0.01342
      0.80  0.00894
      0.90  0.00447
      1.00  0.00112
    </tableData>
  </table>
</propeller>
