<?xml version="1.0"?>
<!-- Author: junyeopkwon -->

<propeller name="ADS_0 pusher prop template" version="1.1">
  <ixx unit="KG*M2">0</ixx>
  <diameter unit="IN">0</diameter>
  <numblades>0</numblades>
  <constspeed>0</constspeed>

  <table name="C_THRUST" type="internal">
    <tableData>
      0  0
      0  0
      0  0
      0  0
      0  0
      0  0
      0  0
      0  0
      0  0
      0  0
      0 0
    </tableData>
  </table>

  <table name="C_POWER" type="internal">
    <tableData>
      0  0
      0  0
      0  0
      0  0
      0  0
      0  0
      0  0
      0  0
      0  0
      0  0
      0  0
    </tableData>
  </table>
</propeller>
