<?xml version="1.0"?>
<!--
  QuadX_Prop.xml — QuadX_Baseline 프로펠러 정의 (JSBSim propeller file)

  출처: JSBSim 공식 저장소(JSBSim-Team/jsbsim) F450 예제의 DJI_9450.xml을 그대로
  재사용함(실측 기반 추력/파워 계수 테이블, J=0~0.73 구간). 원저작물의 출처를
  존중하여 name 속성에 출처를 명시함. 계수 테이블 자체는 원문 그대로이며 변경하지
  않았음(재검산 결과 호버/최대추력 계산과 정합 — docs/QuadX_Baseline_model.md 참고).

  주의(알려진 한계): JSBSim은 프로펠러 ixx가 0.001 slug*ft2 미만이면 내부적으로
  0.001 slug*ft2로 강제 클램핑한다. 아래 ixx=6.05e-05 kg*m2를 slug*ft2로 환산하면
  약 4.463e-05 slug*ft2로, 클램프 하한의 약 1/22.4 수준이다. 즉 실제 시뮬레이션에서는
  모터 스핀업(과도응답) 시 관성이 실제보다 약 22배 크게 작동하여 회전수 응답이
  실제보다 다소 느리게(랙이 있게) 나타날 수 있다. 정상상태(steady-state) 호버/트림
  값에는 영향이 없다. (자세한 재검산 과정은 docs/QuadX_Baseline_model.md 참고)
-->
<propeller name="DJI 9450 (JSBSim F450 example 기반)" version="1.1">
  <ixx unit="KG*M2"> 6.05e-05 </ixx>
  <diameter unit="IN"> 9.4  </diameter>
  <numblades> 2 </numblades>
  <constspeed> 0 </constspeed>
  <table name="C_THRUST" type="internal">
    <tableData>
      0.0000	0.1288
      0.0209	0.1271
      0.0522	0.1252
      0.0730	0.1230
      0.1039	0.1207
      0.1252	0.1181
      0.1470	0.1153
      0.1774	0.1122
      0.1983	0.1089
      0.2287	0.1053
      0.2504	0.1015
      0.2774	0.0975
      0.3022	0.0932
      0.3235	0.0888
      0.3539	0.0842
      0.3757	0.0794
      0.4039	0.0745
      0.4274	0.0695
      0.4496	0.0644
      0.4787	0.0592
      0.5004	0.0538
      0.5296	0.0483
      0.5526	0.0426
      0.5783	0.0369
      0.6039	0.0310
      0.6257	0.0250
      0.6548	0.0189
      0.6774	0.0128
      0.7039	0.0064
      0.7291	-0.0001
    </tableData>
  </table>
  <table name="C_POWER" type="internal">
    <tableData>
      0.0000  0.0666
      0.0209  0.0647
      0.0522  0.0628
      0.0730  0.0611
      0.1039  0.0595
      0.1252  0.0581
      0.1470  0.0567
      0.1774  0.0554
      0.1983  0.0542
      0.2287  0.0531
      0.2504  0.0520
      0.2774  0.0509
      0.3022  0.0498
      0.3235  0.0485
      0.3539  0.0471
      0.3757  0.0456
      0.4039  0.0440
      0.4274  0.0422
      0.4496  0.0402
      0.4787  0.0381
      0.5004  0.0358
      0.5296  0.0332
      0.5526  0.0305
      0.5783  0.0275
      0.6039  0.0243
      0.6257  0.0210
      0.6548  0.0175
      0.6774  0.0137
      0.7039  0.0099
      0.7291  0.0061
    </tableData>
  </table>
</propeller>
